<Lems>

    <Target component="sim1" />

    <Dimension name="time" t="1"/>
    <Dimension name="per_time" t="-1"/>

    <Dimension name="voltage"     m="1" l="2" t="-3" i="-1"/>
    <Dimension name="per_voltage" m="-1" l="-2" t="3" i="1"/>

    <Dimension name="conductance" m="-1" l="-2" t="3" i="2"/>
    <Dimension name="conductanceDensity" m="-1" l="-4" t="3" i="2"/>

    <Dimension name="capacitance" m="-1" l="-2" t="4" i="2"/>
    <Dimension name="specificCapacitance" m="-1" l="-4" t="4" i="2"/>

    <Dimension name="resistance"  m="1" l="2" t="-3" i="-2"/>
    <Dimension name="resistivity" m="2" l="2" t="-3" i="-2"/>

    <Dimension name="charge" i="1" t="1"/>

    <Dimension name="charge_per_mole" i="1" t="1" n="-1"/>

    <Dimension name="current" i="1"/>

    <Dimension name="currentDensity" i="1" l="-2"/>

    <Dimension name="length" l="1"/>
    <Dimension name="area" l="2"/>
    <Dimension name="volume" l="3"/>

    <Dimension name="concentration" l="-3" n="1"/>

    <Dimension name="substance" n="1"/>

    <Dimension name="permeability" l="1" t="-1"/>

    <Dimension name="temperature" k="1"/>

    <Dimension name="idealGasConstantDims" m="1" l="2" t="-2" k="-1" n="-1"/>

    <Dimension name="rho_factor" l="-1" n="1" i="-1" t="-1"/>

    <Unit symbol="s" dimension="time" power="0"/>
    <Unit symbol="per_s" dimension="per_time" power="0"/>
    <Unit symbol="Hz" dimension="per_time" power="0"/>
    <Unit symbol="ms" dimension="time" power="-3"/>
    <Unit symbol="per_ms" dimension="per_time" power="3"/>

    <Unit symbol="min" dimension="time" power="0" scale="60"/>
    <Unit symbol="per_min" dimension="per_time" power="0" scale="0.01666666667"/>
    <Unit symbol="hour" dimension="time" power="0" scale="3600"/>
    <Unit symbol="per_hour" dimension="per_time" power="0" scale="0.00027777777778"/>

    <Unit symbol="m" dimension="length" power="0"/>
    <Unit symbol="cm" dimension="length" power="-2"/>
    <Unit symbol="um" dimension="length" power="-6"/>

    <Unit symbol="m2" dimension="area" power="0"/>
    <Unit symbol="cm2" dimension="area" power="-4"/>
    <Unit symbol="um2" dimension="area" power="-12"/>

    <Unit symbol="m3" dimension="volume" power="0"/>
    <Unit symbol="cm3" dimension="volume" power="-6"/>
    <Unit symbol="litre" dimension="volume" power="-3"/>
    <Unit symbol="um3" dimension="volume" power="-18"/>

    <Unit symbol="V" dimension="voltage" power="0"/>
    <Unit symbol="mV" dimension="voltage" power="-3"/>
    <Unit symbol="per_V" dimension="per_voltage" power="0"/>
    <Unit symbol="per_mV" dimension="per_voltage" power="3"/>

    <Unit symbol="ohm" dimension="resistance" power="0"/>
    <Unit symbol="kohm" dimension="resistance" power="3"/>
    <Unit symbol="Mohm" dimension="resistance" power="6"/>

    <Unit symbol="S" dimension="conductance" power="0"/>
    <Unit symbol="mS" dimension="conductance" power="-3"/>
    <Unit symbol="uS" dimension="conductance" power="-6"/>
    <Unit symbol="nS" dimension="conductance" power="-9"/>
    <Unit symbol="pS" dimension="conductance" power="-12"/>

    <Unit symbol="S_per_m2" dimension="conductanceDensity" power="0"/>
    <Unit symbol="mS_per_cm2" dimension="conductanceDensity" power="1"/>
    <Unit symbol="S_per_cm2" dimension="conductanceDensity" power="4"/>

    <Unit symbol="F" dimension="capacitance" power="0"/>
    <Unit symbol="uF" dimension="capacitance" power="-6"/>
    <Unit symbol="nF" dimension="capacitance" power="-9"/>
    <Unit symbol="pF" dimension="capacitance" power="-12"/>

    <Unit symbol="F_per_m2" dimension="specificCapacitance" power="0"/>
    <Unit symbol="uF_per_cm2" dimension="specificCapacitance" power="-2"/>

    <Unit symbol="ohm_m" dimension="resistivity" power="0"/>
    <Unit symbol="kohm_cm" dimension="resistivity" power="1"/>
    <Unit symbol="ohm_cm" dimension="resistivity" power="-2"/>

    <Unit symbol="C" dimension="charge" power="0"/>

    <Unit symbol="C_per_mol" dimension="charge_per_mole" power="0"/>

    <Unit symbol="A" dimension="current" power="0"/>
    <Unit symbol="uA" dimension="current" power="-6"/>
    <Unit symbol="nA" dimension="current" power="-9"/>
    <Unit symbol="pA" dimension="current" power="-12"/>

    <Unit symbol="A_per_m2" dimension="currentDensity" power="0"/>
    <Unit symbol="uA_per_cm2" dimension="currentDensity" power="-2"/>
    <Unit symbol="mA_per_cm2" dimension="currentDensity" power="1"/>

    <Unit symbol="mol_per_m3" dimension="concentration" power="0"/>
    <Unit symbol="mol_per_cm3" dimension="concentration" power="6"/>
    <Unit symbol="M" dimension="concentration" power="3"/>
    <Unit symbol="mM" dimension="concentration" power="0"/>

    <Unit symbol="mol" dimension="substance" power="0"/>

    <Unit symbol="m_per_s" dimension="permeability" power="0"/>
    <Unit symbol="cm_per_s" dimension="permeability" power="-2"/>
    <Unit symbol="um_per_ms" dimension="permeability" power="-3"/>
    <Unit symbol="cm_per_ms" dimension="permeability" power="1"/>

    <Unit symbol="degC" dimension="temperature" offset="273.15"/>

    <Unit symbol="K" dimension="temperature" power="0"/>

    <Unit symbol="J_per_K_per_mol" dimension="idealGasConstantDims" power="0"/>

    <Unit symbol="mol_per_m_per_A_per_s" dimension="rho_factor" power="0"/>

    <ComponentType name="notes" description="Human readable notes on a Component">
    </ComponentType>

    <ComponentType name="annotation" description="Annotation...">
        <Child name="property" type="property"/>
        <Child name="rdf:RDF" type="rdf_RDF"/>
        <Dynamics/>
    </ComponentType>

    <ComponentType name="property" description="Property in Annotation...">
        <Text name="tag"/>
        <Text name="value"/>
        <Dynamics/>
    </ComponentType>

    <ComponentType name="rdf_RDF" description="Work in progress...">
        <Child name="rdf:Description" type="rdf_Description"/>
        <Text name="xmlns:rdf"/>
        <Dynamics/>
    </ComponentType>

    <ComponentType name="rdf_Description" description="Work in progress...">

        <Child name="bqbiol:encodes" type="bqbiol_encodes"/>
        <Child name="bqbiol:hasPart" type="bqbiol_hasPart"/>
        <Child name="bqbiol:hasProperty" type="bqbiol_hasProperty"/>
        <Child name="bqbiol:hasVersion" type="bqbiol_hasVersion"/>
        <Child name="bqbiol:is" type="bqbiol_is"/>
        <Child name="bqbiol:isDescribedBy" type="bqbiol_isDescribedBy"/>
        <Child name="bqbiol:isEncodedBy" type="bqbiol_isEncodedBy"/>
        <Child name="bqbiol:isHomologTo" type="bqbiol_isHomologTo"/>
        <Child name="bqbiol:isPartOf" type="bqbiol_isPartOf"/>
        <Child name="bqbiol:isPropertyOf" type="bqbiol_isPropertyOf"/>
        <Child name="bqbiol:isVersionOf" type="bqbiol_isVersionOf"/>
        <Child name="bqbiol:occursIn" type="bqbiol_occursIn"/>
        <Child name="bqbiol:hasTaxon" type="bqbiol_hasTaxon"/>

        <Child name="bqmodel:is" type="bqmodel_is"/>
        <Child name="bqmodel:isDescribedBy" type="bqmodel_isDescribedBy"/>
        <Child name="bqmodel:isDerivedFrom" type="bqmodel_isDerivedFrom"/>
        <Text name="rdf:about"/>

        <Dynamics/>
    </ComponentType>

    <ComponentType name="baseBqbiol" description="Work in progress...">
        <Child name="rdf:Bag" type="rdf_Bag"/>
        <Dynamics/>
    </ComponentType>

    <ComponentType name="bqbiol_encodes" description="See http://co.mbine.org/standards/qualifiers" extends="baseBqbiol"/>
    <ComponentType name="bqbiol_hasPart" description="See http://co.mbine.org/standards/qualifiers" extends="baseBqbiol"/>
    <ComponentType name="bqbiol_hasProperty" description="See http://co.mbine.org/standards/qualifiers" extends="baseBqbiol"/>
    <ComponentType name="bqbiol_hasVersion" description="See http://co.mbine.org/standards/qualifiers" extends="baseBqbiol"/>
    <ComponentType name="bqbiol_is" description="See http://co.mbine.org/standards/qualifiers" extends="baseBqbiol"/>
    <ComponentType name="bqbiol_isDescribedBy" description="See http://co.mbine.org/standards/qualifiers" extends="baseBqbiol"/>
    <ComponentType name="bqbiol_isEncodedBy" description="See http://co.mbine.org/standards/qualifiers" extends="baseBqbiol"/>
    <ComponentType name="bqbiol_isHomologTo" description="See http://co.mbine.org/standards/qualifiers" extends="baseBqbiol"/>
    <ComponentType name="bqbiol_isPartOf" description="See http://co.mbine.org/standards/qualifiers" extends="baseBqbiol"/>
    <ComponentType name="bqbiol_isPropertyOf" description="See http://co.mbine.org/standards/qualifiers" extends="baseBqbiol"/>
    <ComponentType name="bqbiol_isVersionOf" description="See http://co.mbine.org/standards/qualifiers" extends="baseBqbiol">
        <Text name="xmlns:bqbiol"/>
    </ComponentType>
    <ComponentType name="bqbiol_occursIn" description="See http://co.mbine.org/standards/qualifiers" extends="baseBqbiol"/>
    <ComponentType name="bqbiol_hasTaxon" description="See http://co.mbine.org/standards/qualifiers" extends="baseBqbiol"/>

    <ComponentType name="bqmodel_is" description="See http://co.mbine.org/standards/qualifiers" extends="baseBqbiol"/>

    <ComponentType name="bqmodel_isDescribedBy" description="See http://co.mbine.org/standards/qualifiers" extends="baseBqbiol">
        <Text name="xmlns:bqmodel"/>
    </ComponentType>

    <ComponentType name="bqmodel_isDerivedFrom" description="See http://co.mbine.org/standards/qualifiers" extends="baseBqbiol"/>

    <ComponentType name="rdf_Bag" description="Work in progress...">
        <Child name="rdf:li" type="rdf_li"/>
        <Dynamics/>
    </ComponentType>

    <ComponentType name="rdf_li" description="Annotation...">
        <Text name="rdf:resource"/>
        <Dynamics/>
    </ComponentType>

    <ComponentType name="point3DWithDiam"
        description="Base type for ComponentTypes which specify an ( _x, _y, _z ) coordinate along with a _diameter. Note: no dimension used in the attributes for these coordinates! These are assumed to have dimension micrometer (10^-6 m). This is due to micrometers being the default option for the majority of neuronal morphology formats, and dimensions are omitted here to facilitate reading and writing of morphologies in NeuroML.">
        <Parameter name="x" dimension="none" description="x coordinate of point. Note: no dimension used, see note above!"/>
        <Parameter name="y" dimension="none" description="y coordinate of point. Note: no dimension used, see note above!"/>
        <Parameter name="z" dimension="none" description="z coordinate of point. Note: no dimension used, see note above!"/>
        <Parameter name="diameter" dimension="none" description="Diameter at point. Note: no dimension used, see note above!"/>

        <DerivedParameter name="radius" dimension="length" value="MICRON * diameter / 2"/>
        <DerivedParameter name="xLength" dimension="length" value="MICRON * x"/>
        <DerivedParameter name="yLength" dimension="length" value="MICRON * y"/>
        <DerivedParameter name="zLength" dimension="length" value="MICRON * z"/>

        <Constant name="MICRON" dimension="length" value="1um"/>
    </ComponentType>

    <ComponentType name="basePointCurrent"
        description="Base type for all ComponentTypes which produce a current _i (with dimension current)">

        <Exposure name="i" dimension="current" description="The total (time varying) current produced by this ComponentType"/>

    </ComponentType>

    <ComponentType name="baseVoltageDepPointCurrent"
        extends="basePointCurrent"
        description="Base type for all ComponentTypes which produce a current _i (with dimension current) and require a membrane potential _v exposed on the parent Component">

        <Requirement name="v" dimension="voltage" description="The current may vary with the voltage exposed by the ComponentType on which this is placed"/>

    </ComponentType>

    <ComponentType name="basePointCurrentDL"
        description="Base type for all ComponentTypes which produce a dimensionless current _I. There will eventually be dimensionless equivalents of all the core current producing ComponentTypes such as _pulseGenerator_, _sineGenerator_ and _rampGenerator_">

        <Exposure name="I" dimension="none" description="The total (time varying) current produced by this ComponentType"/>

    </ComponentType>

    <ComponentType name="baseVoltageDepPointCurrentDL"
        extends="basePointCurrentDL"
        description="Base type for all ComponentTypes which produce a dimensionless current _I and require a dimensionless membrane potential _V exposed on the parent Component">

        <Requirement name="V" dimension="none" description="The current may vary with the voltage exposed by the ComponentType on which this is placed"/>

    </ComponentType>

    <ComponentType name="baseSpikeSource"
        description="Base for any ComponentType whose main purpose is to emit spikes. The exposed variable _tsince can be used for plotting the time since the Component has spiked last">

        <EventPort name="spike"
            direction="out"
            description="Port on which spikes are emitted"/>

        <Exposure name="tsince"
            dimension="time"
            description="Time since the last spike was emitted"/>

    </ComponentType>

    <ComponentType name="spikeGenerator"
        extends="baseSpikeSource"
        description="Simple generator of spikes at a regular interval set by _period.">
		<Exposure name="spike_state" dimension="none"/>
        <Parameter name="period" dimension="time" description="Time between spikes. First spike will be emitted after this time."/>
        <Dynamics>
            <StateVariable name="tsince" dimension="time" exposure="tsince"/>
            <StateVariable name="spike_state" dimension="none" exposure="spike_state"/>

            <TimeDerivative variable="tsince" value="1"/>

            <OnStart>
                <StateAssignment variable="tsince" value="0"/>
                <StateAssignment variable="spike_state" value="0"/>
            </OnStart>

            <OnCondition test="tsince .gt. period">
                <StateAssignment variable="tsince" value="0"/>
                <EventOut port="spike"/>
                <StateAssignment variable="spike_state" value="1"/>
            </OnCondition>

            <OnCondition test="tsince .gt. 0">
                <StateAssignment variable="spike_state" value="0"/>
            </OnCondition>

        </Dynamics>

    </ComponentType>

    <ComponentType name="spikeGeneratorRandom" extends="baseSpikeSource"
        description="Generator of spikes with a random interspike interval of at least _minISI and at most _maxISI">

        <Parameter name="maxISI" dimension="time" description="Maximum interspike interval"/>
        <Parameter name="minISI" dimension="time" description="Minimum interspike interval"/>

        <Constant name="MSEC" dimension="time" value="1ms"/>

        <Exposure name="isi" dimension="time" description="The interval until the next spike"/>

        <Dynamics>
            <StateVariable name="tsince" dimension="time" exposure="tsince"/>

            <StateVariable name="isi" dimension="time" exposure="isi"/>

            <TimeDerivative variable="tsince" value="1"/>

            <OnStart>
                <StateAssignment variable="tsince" value="0"/>
                <StateAssignment variable="isi" value="minISI + MSEC * random((maxISI - minISI) / MSEC)"/>
            </OnStart>

            <OnCondition test="tsince .geq. isi">
                <StateAssignment variable="isi" value="minISI + MSEC * random((maxISI - minISI) / MSEC)"/>
                <StateAssignment variable="tsince" value="0"/>
                <EventOut port="spike"/>
            </OnCondition>

        </Dynamics>
    </ComponentType>

    <ComponentType name="spikeGeneratorPoisson" extends="baseSpikeSource"
		   description="Generator of spikes whose ISI is distributed according to an exponential pdf with scale 1/_averageRate">
      <Parameter name="averageRate" dimension="per_time"/>
      <DerivedParameter name="averageIsi" dimension="time" value="1 / averageRate"/>
      <Dynamics>
	<StateVariable name="tsince" dimension="time" exposure="tsince"/>
	<StateVariable name="isi" dimension="time"/>

	<TimeDerivative variable="tsince" value="1"/>

	<OnStart>
	  <StateAssignment variable="tsince" value="0"/>
	  <StateAssignment variable="isi" value="- averageIsi * log(1 - random(1))"/>
	</OnStart>

	<OnCondition test="tsince .geq. isi">
	  <StateAssignment variable="tsince" value="0"/>
	  <StateAssignment variable="isi" value="- averageIsi * log(1 - random(1))"/>
	  <EventOut port="spike"/>
	</OnCondition>
      </Dynamics>
    </ComponentType>

    <ComponentType name="pulseGenerator" extends="basePointCurrent"
        description="Generates a constant current pulse of a certain _amplitude for a specified _duration after a _delay">

        <Parameter name="delay" dimension="time" description="Delay before change in current. Current is zero  prior to this."/>
        <Parameter name="duration" dimension="time" description="Duration for holding current at amplitude. Current is zero after delay + duration."/>
        <Parameter name="amplitude" dimension="current" description="Amplitude of current pulse"/>

        <EventPort name="in" direction="in" description="Note this is not used here. Will be removed in future"/>

        <Dynamics>

            <StateVariable name="i" exposure="i" dimension="current"/>

            <OnEvent port="in">
            </OnEvent>

            <OnCondition test="t .lt. delay">
                <StateAssignment variable="i" value="0"/>
            </OnCondition>

            <OnCondition test="t .geq. delay .and. t .lt. duration + delay">
                <StateAssignment variable="i" value="amplitude"/>
            </OnCondition>

            <OnCondition test="t .geq. duration + delay">
                <StateAssignment variable="i" value="0"/>
            </OnCondition>

        </Dynamics>
    </ComponentType>

    <ComponentType name="pulseGeneratorDL" extends="basePointCurrentDL"
        description="Dimensionless equivalent of _pulseGenerator_. Generates a constant current pulse of a certain _amplitude for a specified _duration after a _delay">

        <Parameter name="delay" dimension="time" description="Delay before change in current. Current is zero  prior to this."/>
        <Parameter name="duration" dimension="time" description="Duration for holding current at amplitude. Current is zero after delay + duration."/>
        <Parameter name="amplitude" dimension="none" description="Amplitude of current pulse"/>

        <EventPort name="in" direction="in" description="Note this is not used here. Will be removed in future"/>

        <Dynamics>

            <StateVariable name="I" exposure="I" dimension="none"/>

            <OnEvent port="in">
            </OnEvent>

            <OnCondition test="t .lt. delay">
                <StateAssignment variable="I" value="0"/>
            </OnCondition>

            <OnCondition test="t .geq. delay .and. t .lt. duration + delay">
                <StateAssignment variable="I" value="amplitude"/>
            </OnCondition>

            <OnCondition test="t .geq. duration + delay">
                <StateAssignment variable="I" value="0"/>
            </OnCondition>

        </Dynamics>
    </ComponentType>

    <ComponentType name="sineGenerator" extends="basePointCurrent"
        description="Generates a sinusoidally varying current after a time _delay, for a fixed _duration. The _period and maximum _amplitude of the current can be set as well as the _phase at which to start.">

        <Parameter name="phase" dimension="none"/>
        <Parameter name="delay" dimension="time"/>
        <Parameter name="duration" dimension="time"/>
        <Parameter name="amplitude" dimension="current"/>
        <Parameter name="period" dimension="time"/>

        <EventPort name="in" direction="in"/>

        <Dynamics>

            <StateVariable name="i" exposure="i" dimension="current"/>

            <OnEvent port="in">
            </OnEvent>

            <OnCondition test="t .lt. delay">
                <StateAssignment variable="i" value="0"/>
            </OnCondition>

            <OnCondition test="t .geq. delay .and. t .lt. duration+delay">
                <StateAssignment variable="i" value="amplitude * sin(phase + (2 * 3.14159265 * (t-delay)/period) )"/>
            </OnCondition>

            <OnCondition test="t .geq. duration+delay">
                <StateAssignment variable="i" value="0"/>
            </OnCondition>

        </Dynamics>
    </ComponentType>

    <ComponentType name="rampGenerator" extends="basePointCurrent"
        description="Generates a ramping current after a time _delay, for a fixed _duration. During this time the current steadily changes from _startAmplitude to _finishAmplitude.">

        <Parameter name="delay" dimension="time"/>
        <Parameter name="duration" dimension="time"/>
        <Parameter name="startAmplitude" dimension="current"/>
        <Parameter name="finishAmplitude" dimension="current"/>
        <Parameter name="baselineAmplitude" dimension="current"/>

        <EventPort name="in" direction="in"/>

        <Dynamics>

            <StateVariable name="i" exposure="i" dimension="current"/>

            <OnStart>
                <StateAssignment variable="i" value="baselineAmplitude"/>
            </OnStart>

            <OnEvent port="in">
            </OnEvent>

            <OnCondition test="t .lt. delay">
                <StateAssignment variable="i" value="baselineAmplitude"/>
            </OnCondition>

            <OnCondition test="t .geq. delay .and. t .lt. duration+delay">
                <StateAssignment variable="i" value="startAmplitude + (finishAmplitude - startAmplitude) * (t - delay) / (duration)"/>
            </OnCondition>

            <OnCondition test="t .geq. duration+delay">
                <StateAssignment variable="i" value="baselineAmplitude"/>
            </OnCondition>

        </Dynamics>
    </ComponentType>

    <ComponentType name="rampGeneratorDL" extends="basePointCurrentDL"
        description="Generates a ramping current after a time _delay, for a fixed _duration. During this time the dimensionless current steadily changes from _startAmplitude to _finishAmplitude.">

        <Parameter name="delay" dimension="time"/>
        <Parameter name="duration" dimension="time"/>
        <Parameter name="startAmplitude" dimension="none"/>
        <Parameter name="finishAmplitude" dimension="none"/>
        <Parameter name="baselineAmplitude" dimension="none"/>

        <EventPort name="in" direction="in"/>

        <Dynamics>

            <StateVariable name="I" exposure="I" dimension="none"/>

            <OnStart>
                <StateAssignment variable="I" value="baselineAmplitude"/>
            </OnStart>

            <OnEvent port="in">
            </OnEvent>

            <OnCondition test="t .lt. delay">
                <StateAssignment variable="I" value="baselineAmplitude"/>
            </OnCondition>

            <OnCondition test="t .geq. delay .and. t .lt. duration+delay">
                <StateAssignment variable="I" value="startAmplitude + (finishAmplitude - startAmplitude) * (t - delay) / (duration)"/>
            </OnCondition>

            <OnCondition test="t .geq. duration+delay">
                <StateAssignment variable="I" value="baselineAmplitude"/>
            </OnCondition>

        </Dynamics>
    </ComponentType>

    <ComponentType name="voltageClamp" extends="baseVoltageDepPointCurrent"
        description="Voltage clamp. Applies a variable current _i to try to keep parent at _targetVoltage. Not yet fully tested!!!">

        <Parameter name="delay" dimension="time" description="Delay before change in current. Current is zero  prior to this."/>
        <Parameter name="duration" dimension="time" description="Duration for attempting to keep parent at targetVoltage. Current is zero after delay + duration."/>
        <Parameter name="targetVoltage" dimension="voltage" description="Current will be applied to try to get parent to this target voltage"/>
        <Parameter name="seriesResistance" dimension="resistance" description="Current will be calculated by the difference in voltage between the target and parent, divided by this value"/>

        <EventPort name="in" direction="in" description="Note this is not used here. Will be removed in future"/>

        <Dynamics>

            <StateVariable name="i" exposure="i" dimension="current"/>

            <OnEvent port="in">
            </OnEvent>

            <OnCondition test="t .lt. delay">
                <StateAssignment variable="i" value="0"/>
            </OnCondition>

            <OnCondition test="t .geq. delay">
                <StateAssignment variable="i" value="1e-5 * (targetVoltage - v) / seriesResistance"/>
            </OnCondition>

            <OnCondition test="t .gt. duration + delay">
                <StateAssignment variable="i" value="0"/>
            </OnCondition>

        </Dynamics>

    </ComponentType>

    <ComponentType name="spikeArray" extends="baseSpikeSource"
        description="Set of spike ComponentTypes, each emitting one spike at a certain time. Can be used to feed a predetermined spike train into a cell">

        <Children name="spikes" type="spike"/>
        <EventPort name="in" direction="in" description="This will receive events from the children"/>

        <Dynamics>
            <StateVariable name="tsince" dimension="time" exposure="tsince"/>

            <TimeDerivative variable="tsince" value="1"/>

            <OnStart>
                <StateAssignment variable="tsince" value="0"/>
            </OnStart>

            <OnEvent port="in">
                <StateAssignment variable="tsince" value="0"/>
                <EventOut port="spike"/>
            </OnEvent>

        </Dynamics>

    </ComponentType>

    <ComponentType name="spike" extends="baseSpikeSource"
         description="Emits a single spike at the specified time">

        <Parameter name="time" dimension="time" description="Time at which to emit one spike event"/>
        <Exposure name="spiked" dimension="none" description="0 signals not yet spiked, 1 signals has spiked"/>

        <Dynamics>

            <StateVariable name="tsince" dimension="time" exposure="tsince"/>
            <StateVariable name="spiked" dimension="none" exposure="spiked"/>

            <TimeDerivative variable="tsince" value="1"/>

            <OnStart>
                <StateAssignment variable="tsince" value="0"/>
            </OnStart>

            <OnCondition test="(t .geq. time) .and. (spiked .eq. 0)">
                <StateAssignment variable="spiked" value="1"/>
                <StateAssignment variable="tsince" value="0"/>
                <EventOut port="spike"/>
            </OnCondition>
        </Dynamics>

        <Structure>
            <With instance="this" as="a"/>
            <With instance="parent" as="b"/>
            <EventConnection from="a" to="b"/>
        </Structure>

    </ComponentType>

    <ComponentType name="baseSynapse"
                   extends="baseVoltageDepPointCurrent"
                   description="Base type for all synapses, i.e. ComponentTypes which produce a current (dimension current) and change Dynamics in response to an incoming event. cno_0000009">
        <Child name="notes" type="notes"/>

        <EventPort name="in" direction="in"/>

    </ComponentType>

    <ComponentType name="baseSynapseDL"
                   extends="baseVoltageDepPointCurrentDL"
                   description="Base type for all synapses, i.e. ComponentTypes which produce a dimensionless current and change Dynamics in response to an incoming event. cno_0000009">

        <EventPort name="in" direction="in"/>

    </ComponentType>

    <ComponentType name="baseConductanceBasedSynapse"
                   extends="baseSynapse"
                   description="Synapse model which exposes a conductance _g in addition to producing a current. Not necessarily ohmic!! cno_0000027">

        <Parameter name="gbase" dimension="conductance" description="Baseline conductance, generally the maximum conductance following a single spike"/>
        <Parameter name="erev" dimension="voltage" description="Reversal potential of the synapse"/>

        <Exposure name="g" dimension="conductance" description="Time varying conductance through the synapse"/>

    </ComponentType>

    <ComponentType name="expOneSynapse"
                   extends="baseConductanceBasedSynapse"
                   description="Ohmic synapse model whose conductance rises instantaneously by _gbase on receiving an event, and which decays exponentially to zero with time course _tauDecay">

        <Parameter name="tauDecay" dimension="time" description="Time course of decay"/>

        <Dynamics>

            <StateVariable name="g" dimension="conductance" exposure="g"/>

            <DerivedVariable name="i" exposure="i" dimension="current" value="g * (erev - v)" />

            <TimeDerivative variable="g" value="-g / tauDecay" />

            <OnStart>
                <StateAssignment variable="g" value="0" />
            </OnStart>

            <OnEvent port="in">
                <StateAssignment variable="g" value="g + gbase" />
            </OnEvent>

        </Dynamics>
    </ComponentType>

    <ComponentType name="expTwoSynapse"
                   extends="baseConductanceBasedSynapse"
                   description="Ohmic synapse model whose conductance waveform on receiving an event has a rise time of _tauRise and a decay time of _tauDecay. Max conductance reached during this time (assuming zero conductance before) is _gbase.">

        <Parameter name="tauRise" dimension="time" />
        <Parameter name="tauDecay" dimension="time" />

        <DerivedParameter name="peakTime" dimension="time" value="log(tauDecay / tauRise) * (tauRise * tauDecay)/(tauDecay - tauRise)"/>
        <DerivedParameter name="waveformFactor" dimension="none" value="1 / (-exp(-peakTime / tauRise) + exp(-peakTime / tauDecay))"/>

        <Dynamics>
            <StateVariable name="A" dimension="none"/>
            <StateVariable name="B" dimension="none"/>

            <DerivedVariable name="g" dimension="conductance" exposure="g" value="gbase * (B - A)" />
            <DerivedVariable name="i" exposure="i" dimension="current" value="g * (erev - v)" />

            <TimeDerivative variable="A" value="-A / tauRise" />
            <TimeDerivative variable="B" value="-B / tauDecay" />

            <OnStart>
                <StateAssignment variable="A" value="0" />
                <StateAssignment variable="B" value="0" />
            </OnStart>

            <OnEvent port="in">
                <StateAssignment variable="A" value="A + waveformFactor" />
                <StateAssignment variable="B" value="B + waveformFactor" />
            </OnEvent>

        </Dynamics>
    </ComponentType>

    <ComponentType name="baseBlockMechanism"
                   description="Base of any ComponentType which produces a varying scaling (or blockage) of synaptic strength of magnitude _scaling">

        <Exposure name="blockFactor" dimension="none"/>

    </ComponentType>

    <ComponentType name="voltageConcDepBlockMechanism"
                   extends="baseBlockMechanism"
                   description="Synaptic blocking mechanism which varys with membrane potential across the synapse, e.g. in NMDA receptor mediated synapses">

        <Parameter name="blockConcentration" dimension="concentration" />
        <Parameter name="scalingConc" dimension="concentration" />
        <Parameter name="scalingVolt" dimension="voltage" />

        <Requirement name="v" dimension="voltage"/>

        <Text name="species"/>

        <Dynamics>
            <DerivedVariable name="blockFactor" dimension="none" exposure="blockFactor" value="1/(1 + (blockConcentration / scalingConc)* exp(-1 * (v / scalingVolt)))" />
        </Dynamics>

    </ComponentType>

    <ComponentType name="basePlasticityMechanism"
                   description="Base plasticity mechanism.">
        <EventPort name="in" direction="in" description="This is where the plasticity mechanism receives spike events from the parent synapse."/>
        <Exposure name="plasticityFactor" dimension="none"/>
    </ComponentType>

    <ComponentType name="tsodyksMarkramDepMechanism"
                   extends="basePlasticityMechanism"
                   description="Depression-only Tsodyks-Markram model, as in Tsodyks and Markram 1997.">
        <Parameter name="initReleaseProb" dimension="none" />
        <Parameter name="tauRec" dimension="time" />

        <Dynamics>
            <StateVariable name="R" dimension="none"/>

            <DerivedVariable name="U" dimension="none" value="initReleaseProb"/>
            <DerivedVariable name="plasticityFactor" dimension="none" exposure="plasticityFactor" value="R * U" />

            <TimeDerivative variable="R" value="(1 - R) / tauRec"/>

            <OnStart>
                <StateAssignment variable="R" value="1" />
            </OnStart>

            <OnEvent port="in">
                <StateAssignment variable="R" value="R * (1 - U)" />
            </OnEvent>
        </Dynamics>

        <Structure>
            <With instance="parent" as="a"/>
            <With instance="this" as="b"/>
            <EventConnection from="a" to="b"/>
        </Structure>

    </ComponentType>

    <ComponentType name="tsodyksMarkramDepFacMechanism"
                   extends="basePlasticityMechanism"
                   description="Full Tsodyks-Markram STP model with both depression and facilitation, as in Tsodyks, Pawelzik and Markram 1998.">
        <Parameter name="initReleaseProb" dimension="none" />
        <Parameter name="tauRec" dimension="time" />
        <Parameter name="tauFac" dimension="time" />

        <Dynamics>
            <StateVariable name="R" dimension="none"/>
            <StateVariable name="U" dimension="none"/>

            <DerivedVariable name="plasticityFactor" dimension="none" exposure="plasticityFactor" value="R * U" />

            <TimeDerivative variable="R" value="(1 - R) / tauRec"/>
            <TimeDerivative variable="U" value="(initReleaseProb - U) / tauFac"/>

            <OnStart>
                <StateAssignment variable="R" value="1" />
                <StateAssignment variable="U" value="initReleaseProb" />
            </OnStart>

            <OnEvent port="in">
                <StateAssignment variable="R" value="R * (1 - U)" />
                <StateAssignment variable="U" value="U + initReleaseProb * (1 - U)" />
            </OnEvent>
        </Dynamics>

        <Structure>
            <With instance="parent" as="a"/>
            <With instance="this" as="b"/>
            <EventConnection from="a" to="b"/>
        </Structure>

    </ComponentType>

    <ComponentType name="blockingPlasticSynapse"
                   extends="expTwoSynapse"
                   description="Biexponential synapse that allows for
				optional block and plasticity
				mechanisms, which can be expressed as
				child elements.">
        <Child name="plasticityMechanism" type="basePlasticityMechanism"/>
        <Child name="blockMechanism" type="baseBlockMechanism"/>
        <EventPort name="relay" direction="out" description="Used to relay incoming spikes to child plasticity mechanism"/>
        <Dynamics>
            <StateVariable name="A" dimension="none"/>
            <StateVariable name="B" dimension="none"/>

            <DerivedVariable name="plasticityFactor" dimension="none"
                             select="plasticityMechanism/plasticityFactor"
                             reduce="multiply" required="false"/>
            <DerivedVariable name="blockFactor" dimension="none"
                             select="blockMechanism/blockFactor"
                             reduce="multiply" required="false"/>
            <DerivedVariable name="g" dimension="conductance" exposure="g"
                             value="blockFactor * gbase * (B - A)" />
            <DerivedVariable name="i" exposure="i" dimension="current"
                             value="g * (erev - v)" />

            <TimeDerivative variable="A" value="-A / tauRise" />
            <TimeDerivative variable="B" value="-B / tauDecay" />

            <OnStart>
                <StateAssignment variable="A" value="0" />
                <StateAssignment variable="B" value="0" />
            </OnStart>

            <OnEvent port="in">
                <StateAssignment variable="A" value="A + plasticityFactor * waveformFactor" />
                <StateAssignment variable="B" value="B + plasticityFactor * waveformFactor" />
                <EventOut port="relay"/>
            </OnEvent>
        </Dynamics>
    </ComponentType>

    <ComponentType name="stdpSynapse"
                   extends="expTwoSynapse"
                   description="Spike timing dependent plasticity mechanism,  NOTE: EXAMPLE NOT YET WORKING!!!! cno_0000034">

        <Constant name="tsinceRate" dimension="none" value="1"/>
        <Constant name="longTime" dimension="time" value="1000s"/>

        <Exposure name="tsince" dimension="time"/>

        <Exposure name="M" dimension="none"/>
        <Exposure name="P" dimension="none"/>

        <Dynamics>
            <StateVariable name="A" dimension="none"/>
            <StateVariable name="B" dimension="none"/>

            <StateVariable name="M" dimension="none" exposure="M"/>
            <StateVariable name="P" dimension="none" exposure="P"/>

            <StateVariable name="tsince" dimension="time" exposure="tsince"/>

            <DerivedVariable name="g" dimension="conductance" exposure="g" value="gbase * (B - A)" />

            <DerivedVariable name="i" exposure="i" dimension="current" value="g * (erev - v)" />

            <TimeDerivative variable="A" value="-A / tauRise" />
            <TimeDerivative variable="B" value="-B / tauDecay" />

            <TimeDerivative variable="tsince" value="tsinceRate" />

            <OnStart>
                <StateAssignment variable="A" value="0" />
                <StateAssignment variable="B" value="0" />

                <StateAssignment variable="M" value="1" />
                <StateAssignment variable="P" value="1" />

                <StateAssignment variable="tsince" value="longTime" />
            </OnStart>

            <OnEvent port="in">
                <StateAssignment variable="A" value="A + waveformFactor" />
                <StateAssignment variable="B" value="B + waveformFactor" />
                <StateAssignment variable="tsince" value="0" />
            </OnEvent>

        </Dynamics>

    </ComponentType>

    <ComponentType name="expOneSynapseDL"
                   extends="basePointCurrentDL"
                   description="DL synapse model whose conductance rises instantaneously by _gbase on receiving an event, and which decays exponentially to zero with time course _tauDecay">

        <Parameter name="tauDecay" dimension="time" description="Time course of decay"/>
		<Parameter name="amplitude" dimension="none" description="Amplitude of current pulse"/>

        <EventPort name="in" direction="in" description="Note this is not used here. Will be removed in future"/>

        <Dynamics>

            <StateVariable name="I" dimension="none" exposure="I"/>

            <TimeDerivative variable="I" value="-I / tauDecay" />

            <OnStart>
                <StateAssignment variable="I" value="0" />
            </OnStart>

            <OnEvent port="in">
                <StateAssignment variable="I" value="I + amplitude" />
            </OnEvent>

        </Dynamics>
    </ComponentType>

    <ComponentType name="network" description="Network containing _population_s, _projection_s and lists of _explicitConnection_s (either directly between components of the populations or via synapses)">

        <Children name="regions" type="region"/>
        <Children name="populations" type="basePopulation"/>
        <Children name="projections" type="projection"/>

        <Children name="synapticConnections" type="explicitConnection"/>

        <Children name="explicitInputs" type="explicitInput"/>

        <Children name="inputs" type="inputList"/>

    </ComponentType>

    <ComponentType name="networkWithTemperature" description="Network containing _population_s, _projection_s and lists of _explicitConnection_s (either directly between components of the populations or via synapses), and an explicit temperature" extends="network">

        <Parameter name="temperature" dimension="temperature"/>

    </ComponentType>

    <ComponentType name="basePopulation" description="A population of cells (anything which extends _baseCell_)">
        <Child name="notes" type="notes"/>
        <Child name="annotation" type="annotation"/>
        <ComponentReference name="component" type="baseCell"/>
    </ComponentType>

    <ComponentType name="population" extends="basePopulation" description="A population of components, with just one parameter for the _size">
        <Parameter name="size" dimension="none" description="Number of instances of this Component to create when the population is instantiated"/>
        <ComponentReference name="component" type="Component"/>
        <Structure>
            <MultiInstantiate number="size" component="component"/>
        </Structure>
    </ComponentType>

    <ComponentType name="populationList" extends="basePopulation" description="An explicit list of the cells in the population. Work in progress...">

        <Children name="instances" type="instance"/>

        <ComponentReference name="component" type="baseCell"/>
    </ComponentType>

    <ComponentType name="instance" description="Initial attempt to specify instances in populations. Work in progress...">
        <Child name="location" type="location"/>
        <Structure>
            <ChildInstance component="../component"/>
        </Structure>

    </ComponentType>

    <ComponentType name="location" description="Initial attempt to specify instances in populations. Work in progress...">
        <Parameter name="x" dimension="none"/>
        <Parameter name="y" dimension="none"/>
        <Parameter name="z" dimension="none"/>
    </ComponentType>

    <ComponentType name="region" description="Initial attempt to specify 3D region for placing cells. Work in progress...">
        <Child name="rectangularExtent" type="rectangularExtent"/>
    </ComponentType>

    <ComponentType name="rectangularExtent" description="For defining a 3D rectangular box">
        <Parameter name="xStart" dimension="none"/>
        <Parameter name="yStart" dimension="none"/>
        <Parameter name="zStart" dimension="none"/>
        <Parameter name="xLength" dimension="none"/>
        <Parameter name="yLength" dimension="none"/>
        <Parameter name="zLength" dimension="none"/>
    </ComponentType>

    <ComponentType name="projection"
        description="Projection from one population to another. Currently it's better to define an explicit list of connections, using _explicitConnection_. Work in progress...">

        <Child name="synapseComponent" type="synapseComponent"/>
        <Children name="connections" type="connection"/>
        <ComponentReference name="synapse" type="baseSynapse"/>
        <Path name="presynapticPopulation"/>
        <Path name="postsynapticPopulation"/>
    </ComponentType>

    <ComponentType name="synapseComponent" description="Work in progress...">
        <ComponentReference name="component" type="baseSynapse"/>
    </ComponentType>

    <ComponentType name="connection"
        description="Explicit event connection directly between named components, which gets processed via a new instance of a _synapse component which is created on the target component. Normally contained inside a _projection_ element.">

        <Path name="preCellId"/>
        <Path name="postCellId"/>
        <Text name="destination"/>

        <Structure>
            <With instance="preCellId" as="a"/>
            <With instance="postCellId" as="b"/>
            <EventConnection from="a" to="b" receiver="../synapse" receiverContainer="destination" sourcePort="sourcePort" targetPort="targetPort"/>
        </Structure>

    </ComponentType>

    <ComponentType name="explicitConnection"
        description="Explicit event connection between components">
        <Path name="from"/>
        <Path name="to"/>
        <Text name="targetPort"/>
    </ComponentType>

    <ComponentType name="synapticConnection"
        description="Explicit event connection between named components, which gets processed via a new instance of a _synapse component which is created on the target component"
        extends="explicitConnection">

        <ComponentReference name="synapse" type="baseSynapse"/>
        <Path name="from"/>
        <Path name="to"/>
        <Text name="destination"/>

        <Structure>
            <With instance="from" as="a"/>
            <With instance="to" as="b"/>
            <EventConnection from="a" to="b" receiver="synapse" receiverContainer="destination" sourcePort="sourcePort" targetPort="targetPort"/>

        </Structure>
    </ComponentType>

    <ComponentType name="synapticConnectionWD"
    description="Explicit event connection between named components, which gets processed via a new instance of a _synapse component which is created on the target component, includes setting of _weight and _delay for the synaptic connection"
    extends="synapticConnection">

        <Parameter name="weight" dimension="none"/>
        <Parameter name="delay" dimension="time"/>
        <Path name="from"/>
        <Path name="to"/>

        <Structure>
            <With instance="from" as="a"/>
            <With instance="to" as="b"/>

            <EventConnection from="a" to="b" receiver="synapse" delay="delay">

                <Assign property="weight" value="weight"/>
            </EventConnection>
        </Structure>

    </ComponentType>

    <ComponentType name="explicitInput" description="An explicit input (anything which extends _basePointCurrent_) to a target cell in a population">

        <ComponentReference name="input" type="basePointCurrent"/>

        <Path name="target"/>

        <Text name="destination"/>
        <Text name="sourcePort"/>
        <Text name="targetPort"/>

        <Structure>
            <With instance="target" as="a"/>
            <With instance="target" as="b"/>

            <EventConnection from="a" to="b" receiver="input" receiverContainer="destination"/>
        </Structure>
    </ComponentType>

    <ComponentType name="inputList" description="An explicit list of inputs. Not yet stable...">

        <Children name="inputs" type="input"/>
        <ComponentReference name="component" type="basePointCurrent"/>
        <Text name="population"/>

    </ComponentType>

    <ComponentType name="input" description="Initial attempt to specify input lists. Work in progress...">

        <Path name="target"/>
        <Text name="destination"/>
        <Structure>

            <With instance="target" as="a"/>
            <With instance="target" as="b"/>

            <EventConnection from="a" to="b" receiver="../component" receiverContainer="destination"/>
        </Structure>

    </ComponentType>

    <ComponentType name="Display">
        <Parameter name="xmin" dimension="none"/>
        <Parameter name="xmax" dimension="none"/>
        <Parameter name="ymin" dimension="none"/>
        <Parameter name="ymax" dimension="none"/>

        <Parameter name="timeScale" dimension="time"/>
        <Children name="lines" type="Line"/>
        <Text name="title"/>

        <Simulation>
            <DataDisplay title="title" dataRegion="xmin,xmax,ymin,ymax"/>
        </Simulation>
    </ComponentType>

    <ComponentType name="Line">
        <Parameter name="scale" dimension="*"/>
         <Parameter name="timeScale" dimension="*"/>
        <Path name="quantity"/>
        <Text name="color"/>
        <Simulation>
            <Record quantity="quantity" timeScale="timeScale" scale="scale" color="color"/>
        </Simulation>
    </ComponentType>

    <ComponentType name="Simulation">
        <Parameter name="length" dimension="time"/>
        <Parameter name="step" dimension="time"/>

        <Children name="displays" type="Display"/>
        <Children name="outputs" type="OutputFile"/>

        <ComponentReference name="target" type="Component"/>

        <Dynamics>
            <StateVariable name="t" dimension="time"/>
        </Dynamics>

        <Simulation>
            <Run component="target" variable="t" increment="step" total="length"/>
        </Simulation>
    </ComponentType>

    <ComponentType name="OutputFile">

    	<Children name="outputColumn" type="OutputColumn"/>

        <Text name="path"/>
        <Text name="fileName"/>

    	<Simulation>
    		<DataWriter path="path" fileName="fileName"/>
    	</Simulation>

    </ComponentType>

    <ComponentType name="OutputColumn">
         <Path name="quantity"/>
    	 <Simulation>
            <Record quantity="quantity"/>
        </Simulation>
    </ComponentType>

    <ComponentType name="baseVoltageDepRate"
               description="Base ComponentType for voltage dependent rate. Produces a time varying rate _r which depends on _v.">
        <Exposure name="r" dimension="per_time"/>
        <Requirement name="v" dimension="voltage"/>
    </ComponentType>

    <ComponentType name="baseVoltageConcDepRate"
               description="Base ComponentType for voltage and concentration dependent rate. Produces a time varying rate _r which depends on _v and _caConc."
               extends="baseVoltageDepRate">
        <Requirement name="caConc" dimension="concentration"/>
    </ComponentType>

    <ComponentType name="baseHHRate"
               description="Base ComponentType for rate which follow one of the typical forms for rate equations in the standard HH formalism, using the parameters _rate, _midpoint and _scale"
               extends="baseVoltageDepRate">
        <Parameter name="rate" dimension="per_time"/>
        <Parameter name="midpoint" dimension="voltage"/>
        <Parameter name="scale" dimension="voltage"/>
    </ComponentType>

    <ComponentType name="HHExpRate"
        extends="baseHHRate"
        description="Exponential form for rate equation (Q: Should these be renamed hhExpRate, etc?)">
        <Dynamics>
            <DerivedVariable name="r" exposure="r" value="rate * exp((v - midpoint)/scale)" dimension="per_time"/>
        </Dynamics>
    </ComponentType>

    <ComponentType name="HHSigmoidRate"
        extends="baseHHRate"
        description="Sigmoidal form for rate equation">
        <Dynamics>
            <DerivedVariable name="r" exposure="r" value="rate / (1 + exp(0 - (v - midpoint)/scale))" dimension="per_time"/>
        </Dynamics>
    </ComponentType>

    <ComponentType name="HHExpLinearRate"
        extends="baseHHRate"
        description="Exponential linear form for rate equation. Linear for large positive _v, exponentially decays for large negative _v.">

        <Exposure name="x" dimension="none"/>
		<Dynamics>
            <DerivedVariable name="x" value="(v - midpoint) / scale" dimension="none" exposure="x"/>

            <ConditionalDerivedVariable name="r" exposure="r" dimension="per_time">
            	<Case condition="x .neq. 0" value="rate * x / (1 - exp(0 - x))"/>
            	<Case condition="x .eq. 0" value="rate"/>
            </ConditionalDerivedVariable>
        </Dynamics>
    </ComponentType>

    <ComponentType name="baseVoltageDepVariable"
               description="Base ComponentType for voltage dependent variable  _x, which depends on _v. Can be used for inf/steady state of rate variable.">
        <Exposure name="x" dimension="none"/>
        <Requirement name="v" dimension="voltage"/>
    </ComponentType>

    <ComponentType name="baseVoltageConcDepVariable"
               description="Base ComponentType for voltage and calcium concentration dependent variable _x, which depends on _v and _caConc."
               extends="baseVoltageDepVariable">
        <Requirement name="caConc" dimension="concentration"/>
    </ComponentType>

    <ComponentType name="baseHHVariable"
               description="Base ComponentType for voltage dependent dimensionless variable which follow one of the typical forms for variable equations in the standard HH formalism, using the parameters _rate, _midpoint, _scale"
               extends="baseVoltageDepVariable">
        <Parameter name="rate" dimension="none"/>
        <Parameter name="midpoint" dimension="voltage"/>
        <Parameter name="scale" dimension="voltage"/>
    </ComponentType>

    <ComponentType name="HHExpVariable"
        extends="baseHHVariable"
        description="Exponential form for variable equation">
        <Dynamics>
            <DerivedVariable name="x" dimension="none" exposure="x" value="rate * exp((v - midpoint)/scale)"/>
        </Dynamics>
    </ComponentType>

    <ComponentType name="HHSigmoidVariable"
        extends="baseHHVariable"
        description="Sigmoidal form for variable equation">
        <Dynamics>
            <DerivedVariable name="x" dimension="none" exposure="x" value="rate / (1 + exp(0 - (v - midpoint)/scale))"/>
        </Dynamics>
    </ComponentType>

    <ComponentType name="HHExpLinearVariable"
        extends="baseHHVariable"
        description="Exponential linear form for variable equation. Linear for large positive _v, exponentially decays for large negative _v.">
        <Dynamics>
            <DerivedVariable name="a" dimension="none" value="(v - midpoint) / scale"/>
            <DerivedVariable name="x" dimension="none" exposure="x" value="rate * a / (1 - exp(0 - a))"/>
        </Dynamics>
    </ComponentType>

    <ComponentType name="baseVoltageDepTime"
               description="Base ComponentType for voltage dependent ComponentType producing value _t with dimension time (e.g. for time course of rate variable). Note: time course would not normally be fit to exp/sigmoid etc.">
        <Exposure name="t" dimension="time"/>
        <Requirement name="v" dimension="voltage"/>
    </ComponentType>

    <ComponentType name="baseVoltageConcDepTime"
               description="Base type for voltage and calcium concentration dependent ComponentType producing value _t with dimension time (e.g. for time course of rate variable)."
               extends="baseVoltageDepTime">
        <Requirement name="caConc" dimension="concentration"/>
    </ComponentType>

    <ComponentType name="fixedTimeCourse"
        extends="baseVoltageDepTime"
        description="Time course of a fixed magnitude _tau which can be used for the time course in _gateHH_">

        <Parameter name="tau" dimension="time"/>
        <Dynamics>
            <DerivedVariable name="t" dimension="time" exposure="t" value="tau"/>
        </Dynamics>
    </ComponentType>

    <ComponentType name="baseQ10Settings"
        description="Base ComponentType for a scaling to apply to gating variable time course, usually temperature dependent">

        <Exposure name="q10" dimension="none"/>
        <Requirement name="temperature" dimension="temperature"/>

    </ComponentType>

    <ComponentType name="q10Fixed"
        extends="baseQ10Settings"
        description="A fixed value, _fixedQ10, for the scaling of the time course of the gating variable">
        <Parameter name="fixedQ10" dimension="none"/>
        <Dynamics>
            <DerivedVariable name="q10" exposure="q10" dimension="none" value="fixedQ10"/>
        </Dynamics>
    </ComponentType>

    <ComponentType name="q10ExpTemp"
        extends="baseQ10Settings"
        description="A value for the Q10 scaling which varies as a standard function of the difference between the current temperature, _temperature, and the temperature at which the gating variable equations were determined, _experimentalTemp">

        <Parameter name="q10Factor" dimension="none"/>
        <Parameter name="experimentalTemp" dimension="temperature"/>

        <Constant name="TENDEGREES" dimension="temperature" value="10K"/>

        <Dynamics>

            <DerivedVariable name="q10" exposure="q10" dimension="none" value="q10Factor^((temperature - experimentalTemp)/TENDEGREES)"/>
        </Dynamics>
    </ComponentType>

    <ComponentType name="baseConductanceScaling"
        description="Base ComponentType for a scaling to apply to a gate's conductance, e.g. temperature dependent scaling">

        <Exposure name="factor" dimension="none"/>
        <Requirement name="temperature" dimension="temperature"/>

    </ComponentType>

    <ComponentType name="q10ConductanceScaling"
        extends="baseConductanceScaling"
        description="A value for the conductance scaling which varies as a standard function of the difference between the current temperature, _temperature, and the temperature at which the conductance was originally determined, _experimentalTemp">

        <Parameter name="q10Factor" dimension="none"/>
        <Parameter name="experimentalTemp" dimension="temperature"/>

        <Dynamics>
            <DerivedVariable name="factor" exposure="factor" dimension="none" value="q10Factor^((temperature - experimentalTemp)/10)"/>
        </Dynamics>
    </ComponentType>

    <ComponentType name="baseGate"
        description="Base ComponentType for a voltage and/or concentration dependent gate">
        <Parameter name="instances" dimension="none"/>
        <Exposure name="fcond" dimension="none"/>
        <Exposure name="q" dimension="none"/>
        <Requirement name="v" dimension="voltage"/>

    </ComponentType>

    <ComponentType name="gateHHrates"
        extends="baseGate"
        description="Gate which follows the general Hodgkin Huxley formalism">

        <Child name="notes" type="notes"/>
        <Child name="q10Settings" type="baseQ10Settings"/>

        <Child name="forwardRate" type="baseVoltageDepRate"/>
        <Child name="reverseRate" type="baseVoltageDepRate"/>

        <Exposure name="alpha" dimension="per_time"/>
        <Exposure name="beta" dimension="per_time"/>

        <Exposure name="tau" dimension="time"/>
        <Exposure name="inf" dimension="none"/>

        <Exposure name="rateScale" dimension="none"/>

        <Dynamics>
            <StateVariable name="q" exposure="q" dimension="none"/>

            <DerivedVariable name="rateScale" exposure="rateScale" dimension="none" select="q10Settings/q10" reduce="multiply" required="false"/>

            <DerivedVariable name="alpha" dimension="per_time" exposure="alpha" select="forwardRate/r"/>
            <DerivedVariable name="beta" dimension="per_time" exposure="beta" select="reverseRate/r"/>

            <DerivedVariable name="fcond" exposure="fcond" dimension="none" value="q^instances"/>

            <DerivedVariable name="inf" dimension="none" exposure="inf" value="alpha/(alpha+beta)"/>

            <DerivedVariable name="tau" dimension="time" exposure="tau" value="1/((alpha+beta) * rateScale)"/>

            <TimeDerivative variable="q" value="(inf - q) / tau"/>

            <OnStart>
                <StateAssignment variable="q" value="inf"/>
            </OnStart>

        </Dynamics>
    </ComponentType>

    <ComponentType name="gateHHtauInf"
        extends="baseGate"
        description="Gate which follows the general Hodgkin Huxley formalism">

        <Child name="notes" type="notes"/>
        <Child name="q10Settings" type="baseQ10Settings"/>

        <Child name="timeCourse" type="baseVoltageDepTime" />

        <Child name="steadyState" type="baseVoltageDepVariable" />

        <Exposure name="tau" dimension="time"/>
        <Exposure name="inf" dimension="none"/>

        <Exposure name="rateScale" dimension="none"/>

        <Dynamics>
            <StateVariable name="q" exposure="q" dimension="none"/>

            <DerivedVariable name="rateScale" exposure="rateScale" dimension="none" select="q10Settings/q10" reduce="multiply" required="false"/>

            <DerivedVariable name="fcond" exposure="fcond" dimension="none" value="q^instances"/>

            <DerivedVariable name="inf" dimension="none" exposure="inf" select="steadyState/x"/>

            <DerivedVariable name="tauUnscaled" dimension="time" select="timeCourse/t"/>
            <DerivedVariable name="tau" dimension="time" exposure="tau" value="tauUnscaled / rateScale"/>

            <TimeDerivative variable="q" value="(inf - q) / tau"/>

            <OnStart>
                <StateAssignment variable="q" value="inf"/>
            </OnStart>

        </Dynamics>
    </ComponentType>

    <ComponentType name="gateHHratesTau"
        extends="baseGate"
        description="Gate which follows the general Hodgkin Huxley formalism">

        <Child name="notes" type="notes"/>
        <Child name="q10Settings" type="baseQ10Settings"/>

        <Child name="forwardRate" type="baseVoltageDepRate"/>
        <Child name="reverseRate" type="baseVoltageDepRate"/>
        <Child name="timeCourse" type="baseVoltageDepTime" />

        <Exposure name="alpha" dimension="per_time"/>
        <Exposure name="beta" dimension="per_time"/>

        <Exposure name="tau" dimension="time"/>
        <Exposure name="inf" dimension="none"/>

        <Exposure name="rateScale" dimension="none"/>

        <Dynamics>
            <StateVariable name="q" exposure="q" dimension="none"/>

            <DerivedVariable name="rateScale" exposure="rateScale" dimension="none" select="q10Settings/q10" reduce="multiply" required="false"/>

            <DerivedVariable name="alpha" dimension="per_time" exposure="alpha" select="forwardRate/r"/>
            <DerivedVariable name="beta" dimension="per_time" exposure="beta" select="reverseRate/r"/>

            <DerivedVariable name="fcond" exposure="fcond" dimension="none" value="q^instances"/>

            <DerivedVariable name="inf" dimension="none" exposure="inf" value="alpha/(alpha+beta)"/>

            <DerivedVariable name="tauUnscaled" dimension="time" select="timeCourse/t"/>
            <DerivedVariable name="tau" dimension="time" exposure="tau" value="tauUnscaled / rateScale"/>

            <TimeDerivative variable="q" value="(inf - q) / tau"/>

            <OnStart>
                <StateAssignment variable="q" value="inf"/>
            </OnStart>

        </Dynamics>
    </ComponentType>

    <ComponentType name="gateHHratesInf"
        extends="baseGate"
        description="Gate which follows the general Hodgkin Huxley formalism">

        <Child name="notes" type="notes"/>
        <Child name="q10Settings" type="baseQ10Settings"/>

        <Child name="forwardRate" type="baseVoltageDepRate"/>
        <Child name="reverseRate" type="baseVoltageDepRate"/>
        <Child name="steadyState" type="baseVoltageDepVariable" />

        <Exposure name="alpha" dimension="per_time"/>
        <Exposure name="beta" dimension="per_time"/>

        <Exposure name="tau" dimension="time"/>
        <Exposure name="inf" dimension="none"/>

        <Exposure name="rateScale" dimension="none"/>

        <Dynamics>
            <StateVariable name="q" exposure="q" dimension="none"/>

            <DerivedVariable name="rateScale" exposure="rateScale" dimension="none" select="q10Settings/q10" reduce="multiply" required="false"/>

            <DerivedVariable name="alpha" dimension="per_time" exposure="alpha" select="forwardRate/r"/>
            <DerivedVariable name="beta" dimension="per_time" exposure="beta" select="reverseRate/r"/>

            <DerivedVariable name="fcond" exposure="fcond" dimension="none" value="q^instances"/>

            <DerivedVariable name="inf" dimension="none" exposure="inf" select="steadyState/x"/>

            <DerivedVariable name="tau" dimension="time" exposure="tau" value="1/((alpha+beta) * rateScale)"/>

            <TimeDerivative variable="q" value="(inf - q) / tau"/>

            <OnStart>
                <StateAssignment variable="q" value="inf"/>
            </OnStart>

        </Dynamics>
    </ComponentType>

    <ComponentType name="gateHHratesTauInf"
        extends="baseGate"
        description="Gate which follows the general Hodgkin Huxley formalism">

        <Child name="notes" type="notes"/>
        <Child name="q10Settings" type="baseQ10Settings"/>

        <Child name="forwardRate" type="baseVoltageDepRate"/>
        <Child name="reverseRate" type="baseVoltageDepRate"/>
        <Child name="timeCourse" type="baseVoltageDepTime" />
        <Child name="steadyState" type="baseVoltageDepVariable" />

        <Exposure name="alpha" dimension="per_time"/>
        <Exposure name="beta" dimension="per_time"/>

        <Exposure name="tau" dimension="time"/>
        <Exposure name="inf" dimension="none"/>

        <Exposure name="rateScale" dimension="none"/>

        <Dynamics>
            <StateVariable name="q" exposure="q" dimension="none"/>

            <DerivedVariable name="rateScale" exposure="rateScale" dimension="none" select="q10Settings/q10" reduce="multiply" required="false"/>

            <DerivedVariable name="alpha" dimension="per_time" exposure="alpha" select="forwardRate/r"/>
            <DerivedVariable name="beta" dimension="per_time" exposure="beta" select="reverseRate/r"/>

            <DerivedVariable name="inf" dimension="none" exposure="inf" select="steadyState/x"/>

            <DerivedVariable name="tauUnscaled" dimension="time" select="timeCourse/t"/>
            <DerivedVariable name="tau" dimension="time" exposure="tau" value="tauUnscaled / rateScale"/>

            <DerivedVariable name="fcond" exposure="fcond" dimension="none" value="q^instances"/>

            <TimeDerivative variable="q" value="(inf - q) / tau"/>

            <OnStart>
                <StateAssignment variable="q" value="inf"/>
            </OnStart>

        </Dynamics>
    </ComponentType>

    <ComponentType name="baseIonChannel"
        description="Base for all ion channel ComponentTypes">
        <Parameter name="conductance" dimension="conductance"/>
        <Exposure name="g" dimension="conductance"/>
        <Exposure name="fopen" dimension="none"/>
        <Requirement name="v" dimension="voltage"/>

    </ComponentType>

    <ComponentType name="ionChannelPassive"
        extends="ionChannel"
        description="Simple passive ion channel where the constant conductance through the channel is equal to _conductance">
        <Child name="notes" type="notes"/>
        <Child name="annotation" type="annotation"/>
        <Text name="neuroLexId"/>

        <Dynamics>
            <DerivedVariable name="fopen" exposure="fopen" value="1" dimension="none"/>
            <DerivedVariable name="g" exposure="g" value="conductance" dimension="conductance"/>
        </Dynamics>
    </ComponentType>

    <ComponentType name="ionChannelHH"
        extends="baseIonChannel"
        description="Note _ionChannel_ and _ionChannelHH_ are currently functionally identical. This is needed since many existing examples use ionChannel, some use ionChannelHH. NeuroML v2beta3 will remove one of these, probably ionChannelHH.">
        <Child name="notes" type="notes"/>
        <Child name="annotation" type="annotation"/>

        <Children name="conductanceScaling" type="baseConductanceScaling"/>
        <Children name="gatesHHrates" type="gateHHrates"/>
        <Children name="gatesHHtauInf" type="gateHHtauInf"/>
        <Children name="gatesHHratesTau" type="gateHHratesTau"/>
        <Children name="gatesHHratesInf" type="gateHHratesInf"/>
        <Children name="gatesHHratesTauInf" type="gateHHratesTauInf"/>

        <Text name="neuroLexId"/>
        <Text name="species"/>

        <Dynamics>
            <DerivedVariable name="conductanceScale" dimension="none" select="conductanceScaling[*]/factor" reduce="multiply"/>
            <DerivedVariable name="fopenHHrates" dimension="none" select="gatesHHrates[*]/fcond" reduce="multiply"/>
            <DerivedVariable name="fopenHHtauInf" dimension="none" select="gatesHHtauInf[*]/fcond" reduce="multiply"/>
            <DerivedVariable name="fopenHHratesTau" dimension="none" select="gatesHHratesTau[*]/fcond" reduce="multiply"/>
            <DerivedVariable name="fopenHHratesInf" dimension="none" select="gatesHHratesInf[*]/fcond" reduce="multiply"/>
            <DerivedVariable name="fopenHHratesTauInf" dimension="none" select="gatesHHratesTauInf[*]/fcond" reduce="multiply"/>
            <DerivedVariable name="fopen" exposure="fopen" dimension="none" value="conductanceScale * fopenHHrates * fopenHHtauInf * fopenHHratesTau * fopenHHratesInf * fopenHHratesTauInf"/>
            <DerivedVariable name="g" exposure="g" value="conductance * fopen" dimension="conductance"/>
        </Dynamics>
    </ComponentType>

    <ComponentType name="ionChannel"
        extends="ionChannelHH"
        description="Note _ionChannel_ and _ionChannelHH_ are currently functionally identical. This is needed since many existing examples use ionChannel, some use ionChannelHH. NeuroML v2beta3 will remove one of these, probably ionChannelHH.">

        <Dynamics>
            <DerivedVariable name="conductanceScale" dimension="none" select="conductanceScaling[*]/factor" reduce="multiply"/>
            <DerivedVariable name="fopenHHrates" dimension="none" select="gatesHHrates[*]/fcond" reduce="multiply"/>
            <DerivedVariable name="fopenHHtauInf" dimension="none" select="gatesHHtauInf[*]/fcond" reduce="multiply"/>
            <DerivedVariable name="fopenHHratesTau" dimension="none" select="gatesHHratesTau[*]/fcond" reduce="multiply"/>
            <DerivedVariable name="fopenHHratesInf" dimension="none" select="gatesHHratesInf[*]/fcond" reduce="multiply"/>
            <DerivedVariable name="fopen" exposure="fopen" dimension="none" value="conductanceScale * fopenHHrates * fopenHHtauInf * fopenHHratesTau * fopenHHratesInf"/>
            <DerivedVariable name="g" exposure="g" value="conductance * fopen" dimension="conductance"/>
        </Dynamics>

    </ComponentType>

    <ComponentType name="KSState"
        description="One of the states in which a _gateKS_ can be. The rates of transitions between these states are given by _KSTransition_s">
        <Parameter name="relativeConductance" dimension="none"/>
        <Child name="notes" type="notes"/>
        <Exposure name="occupancy" dimension="none"/>
        <Exposure name="q" dimension="none"/>

        <Dynamics>
            <StateVariable name="occupancy" exposure="occupancy" dimension="none"/>
            <DerivedVariable name="q" dimension="none" exposure="q" value="relativeConductance * occupancy"/>
        </Dynamics>
    </ComponentType>

    <ComponentType name="closedState"
        extends="KSState"
        description="A _KSState_ with _relativeConductance of 0">
        <Fixed parameter="relativeConductance" value="0"/>
    </ComponentType>

    <ComponentType name="openState"
        extends="KSState"
        description="A _KSState_ with _relativeConductance of 1">
        <Fixed parameter="relativeConductance" value="1"/>
    </ComponentType>

    <ComponentType name="ionChannelKS"
        extends="ionChannel"
        description="A kinetic scheme based ion channel with multiple _gateKS_s, each of which consists of multiple _KSState_s and _KSTransition_s giving the rates of transition between them">
        <Children name="gates" type="gateKS"/>

        <Text name="species"/>

        <Dynamics>
            <DerivedVariable name="fopen" exposure="fopen" dimension="none" select="gates[*]/fcond" reduce="multiply"/>
            <DerivedVariable name="g" exposure="g" dimension="conductance" value="fopen * conductance"/>

        </Dynamics>
    </ComponentType>

    <ComponentType name="KSTransition" description="Specified the forward and reverse rates of transition between two _KSState_s in a _gateKS_">
        <Link name="from" type="KSState"/>
        <Link name="to" type="KSState"/>
        <Exposure name="rf" dimension="per_time"/>
        <Exposure name="rr" dimension="per_time"/>

    </ComponentType>

    <ComponentType name="forwardTransition"
        extends="KSTransition"
        description="A forward only _KSTransition_ for a _gateKS_ which specifies a _rate (type _baseHHRate_) which follows one of the standard Hodgkin Huxley forms (e.g. _HHExpRate_, _HHSigmoidRate_, _HHExpLinearRate_">

        <Constant name="SEC" dimension="time" value="1s"/>
        <Child name="rate" type="baseHHRate"/>

        <Dynamics>
            <DerivedVariable name="rf0" dimension="per_time" select="rate/r"/>
            <DerivedVariable name="rf" exposure="rf" dimension="per_time" value="rf0"/>
            <DerivedVariable name="rr" exposure="rr" dimension="per_time" value="0/SEC"/>
        </Dynamics>

    </ComponentType>

    <ComponentType name="reverseTransition"
        extends="KSTransition"
        description="A reverse only _KSTransition_ for a _gateKS_ which specifies a _rate (type _baseHHRate_) which follows one of the standard Hodgkin Huxley forms (e.g. _HHExpRate_, _HHSigmoidRate_, _HHExpLinearRate_">

        <Constant name="SEC" dimension="time" value="1s"/>
        <Child name="rate" type="baseHHRate"/>

        <Dynamics>
            <DerivedVariable name="rr0" dimension="per_time" select="rate/r"/>
            <DerivedVariable name="rr" exposure="rr" dimension="per_time" value="rr0"/>
            <DerivedVariable name="rf" exposure="rf" dimension="per_time" value="0/SEC"/>
        </Dynamics>
    </ComponentType>

    <ComponentType name="vHalfTransition"
        extends="KSTransition"
        description="Transition which specifies both the forward and reverse rates of transition">
        <Parameter name="vHalf" dimension="voltage"/>
        <Parameter name="z" dimension="none"/>
        <Parameter name="gamma" dimension="none"/>
        <Parameter name="tau" dimension="time"/>
        <Parameter name="tauMin" dimension="time"/>
        <Constant name="kte" dimension="voltage" value="25.3mV"/>
        <Requirement name="v" dimension="voltage"/>

        <Dynamics>

            <DerivedVariable name="rf0" dimension="per_time" value="exp(z * gamma * (v - vHalf) / kte) / tau"/>
            <DerivedVariable name="rr0" dimension="per_time" value="exp(-z * (1 - gamma) * (v - vHalf) / kte) / tau"/>
            <DerivedVariable name="rf" exposure="rf" dimension="per_time" value="1 / (1/rf0 + tauMin)"/>
            <DerivedVariable name="rr" exposure="rr" dimension="per_time" value="1 / (1/rr0 + tauMin)"/>
        </Dynamics>
    </ComponentType>

    <ComponentType name="gateKS"
        extends="baseGate"
        description="A gate which consists of multiple _KSState_s and _KSTransition_s giving the rates of transition between them">
        <Children name="states" type="KSState"/>
        <Children name="transitions" type="KSTransition"/>

        <Dynamics>

            <DerivedVariable name="q" exposure="q" dimension="none" select="states[*]/q" reduce="add"/>
            <DerivedVariable name="fopen" exposure="fcond" dimension="none" value="q^instances"/>

            <KineticScheme name="ks" nodes="states" stateVariable="occupancy"
            	edges="transitions" edgeSource="from" edgeTarget="to"
            	forwardRate="rf" reverseRate="rr"/>

        </Dynamics>

    </ComponentType>

    <ComponentType name="baseCell"
        description="Base type of any cell which can be used in a population">
        <Child name="notes" type="notes"/>
    </ComponentType>

    <ComponentType name="baseSpikingCell"
        extends="baseCell"
        description="Base type of any cell which can emit _spike events.">

        <EventPort name="spike" direction="out" description="Spike event"/>

    </ComponentType>

    <ComponentType name="baseCellMembPot"
        extends="baseSpikingCell"
        description="Any spiking cell which has a membrane potential _v with voltage units.">

        <Exposure name="v" dimension="voltage" description="Membrane potential"/>

    </ComponentType>

    <ComponentType name="baseCellMembPotDL"
        extends="baseSpikingCell"
        description="Any spiking cell which has a dimensioness membrane potential, _V.">

        <Exposure name="V" dimension="none" description="Membrane potential"/>

    </ComponentType>

    <ComponentType name="baseChannelPopulation"
       extends="baseVoltageDepPointCurrent"
       description="Base type for any current produced by a population of channels, all of type _ionChannel">

        <ComponentReference name="ionChannel" type="baseIonChannel"/>

    </ComponentType>

    <ComponentType name="channelPopulation"
        extends="baseChannelPopulation"
        description="Population of _number ohmic ion channels. These each produce a conductance _channelg across a reversal potential _erev, giving a total current _i.">

        <Parameter name="number" dimension="none"/>
        <Parameter name="erev" dimension="voltage"/>

        <ComponentReference name="ionChannel" type="baseIonChannel"/>

        <Text name="ion"/>

        <Dynamics>
            <DerivedVariable name="channelg" dimension="conductance" select="ionChannel/g"/>
            <DerivedVariable name="geff" dimension="conductance" value="channelg * number"/>
            <DerivedVariable name="i" dimension="current" exposure="i" value="geff * (erev - v)"/>
        </Dynamics>

        <Structure>
            <ChildInstance component="ionChannel"/>
        </Structure>

    </ComponentType>

    <ComponentType name="channelPopulationNernst"
        extends="baseChannelPopulation"
        description="Population of channels with a time varying reversal potential _erev determined by Nernst equation. Hard coded for Ca only! Work in progress!!">

        <Parameter name="number" dimension="none"/>

        <Constant name="R" dimension="idealGasConstantDims" value="8.3144621 J_per_K_per_mol" description="TODO: Make this a global constant!"/>
        <Constant name="zCa" dimension="none" value="2" description="TODO: Make this a global constant!"/>
        <Constant name="F" dimension="charge_per_mole" value="96485.3 C_per_mol" description="TODO: Make this a global constant!"/>

        <ComponentReference name="ionChannel" type="baseIonChannel"/>

        <Exposure name="erev" dimension="voltage"/>

        <Requirement name="temperature" dimension="temperature"/>
        <Requirement name="caConc" dimension="concentration"/>
        <Requirement name="caConcExt" dimension="concentration"/>

        <Text name="ion"/>

        <Dynamics>

            <DerivedVariable name="singleChannelConductance" dimension="conductance" select="ionChannel/g"/>
            <DerivedVariable name="totalConductance" dimension="conductance" value="singleChannelConductance * number"/>

            <DerivedVariable name="erev" dimension="voltage" exposure="erev" value="(R * temperature / (zCa * F)) * log(caConcExt / caConc)"/>

            <DerivedVariable name="i" dimension="current" exposure="i" value="totalConductance * (erev - v)"/>

        </Dynamics>

        <Structure>
            <ChildInstance component="ionChannel"/>
        </Structure>

    </ComponentType>

    <ComponentType name="baseChannelDensity"
        description="Base type for current distributed on an area of a cell">

        <ComponentReference name="ionChannel" type="baseIonChannel"/>

        <Exposure name="iDensity" dimension="currentDensity"/>

        <Requirement name="v" dimension="voltage"/>

    </ComponentType>

    <ComponentType name="baseChannelDensityCond"
        description="Base type for distributed conductances on an area of a cell producing a (not necessarily ohmic) current"
        extends="baseChannelDensity">

        <Parameter name="condDensity" dimension="conductanceDensity"/>

        <Exposure name="gDensity" dimension="conductanceDensity"/>

    </ComponentType>

    <ComponentType name="channelDensity"
        extends="baseChannelDensityCond"
        description="Specifies a time varying ohmic conductance density, _gDensity, which is distributed on an area of the cell with fixed reversal potential _erev producing a current density _iDensity">

        <Parameter name="erev" dimension="voltage"/>

        <Text name="segmentGroup"/>
        <Text name="ion"/>

        <Dynamics>

            <DerivedVariable name="channelf" dimension="none" select="ionChannel/fopen"/>

            <DerivedVariable name="gDensity" dimension="conductanceDensity" exposure="gDensity" value="condDensity * channelf"/>

            <DerivedVariable name="iDensity"  dimension="currentDensity" exposure="iDensity" value="gDensity * (erev - v)"/>

        </Dynamics>

        <Structure>
            <ChildInstance component="ionChannel"/>
        </Structure>

    </ComponentType>

    <ComponentType name="channelDensityNernst"
        extends="baseChannelDensityCond"
        description="Specifies a time varying conductance density, _gDensity, which is distributed on an area of the cell, producing a current density _iDensity and whose reversal potential is calculated from the Nernst equation. Hard coded for Ca only! Work in progress!!">

        <Constant name="R" dimension="idealGasConstantDims" value="8.3144621 J_per_K_per_mol" description="TODO: Make this a global constant!"/>
        <Constant name="zCa" dimension="none" value="2" description="TODO: Make this a global constant!"/>
        <Constant name="F" dimension="charge_per_mole" value="96485.3 C_per_mol" description="TODO: Make this a global constant!"/>

        <ComponentReference name="ionChannel" type="baseIonChannel"/>

        <Exposure name="erev" dimension="voltage"/>

        <Requirement name="temperature" dimension="temperature"/>
        <Requirement name="caConc" dimension="concentration"/>
        <Requirement name="caConcExt" dimension="concentration"/>

        <Text name="segmentGroup"/>
        <Text name="ion"/>

        <Dynamics>

            <DerivedVariable name="channelf" dimension="none" select="ionChannel/fopen"/>

            <ConditionalDerivedVariable name="gDensity" dimension="conductanceDensity" exposure="gDensity">
            	<Case condition="caConcExt .gt. 0" value="condDensity * channelf"/>
            	<Case condition="caConcExt .leq. 0" value="0"/>
            </ConditionalDerivedVariable>

            <ConditionalDerivedVariable name="erev" dimension="voltage" exposure="erev">
            	<Case condition="caConcExt .gt. 0" value="(R * temperature / (zCa * F)) * log(caConcExt / caConc)"/>
            	<Case condition="caConcExt .leq. 0" value="0"/>
            </ConditionalDerivedVariable>

            <ConditionalDerivedVariable name="iDensity" dimension="currentDensity" exposure="iDensity">
            	<Case condition="caConcExt .gt. 0" value="gDensity * (erev - v)"/>
            	<Case condition="caConcExt .leq. 0" value="0"/>
            </ConditionalDerivedVariable>

        </Dynamics>

        <Structure>
            <ChildInstance component="ionChannel"/>
        </Structure>

    </ComponentType>

    <ComponentType name="channelDensityGHK"
        extends="baseChannelDensity"
        description="Specifies a time varying conductance density, _gDensity, which is distributed on an area of the cell, producing a current density _iDensity and whose reversal potential is calculated from the Goldman Hodgkin Katz equation. Hard coded for Ca only! Work in progress!">

        <Parameter name="permeability" dimension="permeability"/>

        <Constant name="R" dimension="idealGasConstantDims" value="8.3144621 J_per_K_per_mol" description="TODO: Make this a global constant!"/>
        <Constant name="zCa" dimension="none" value="2" description="TODO: Make this a global constant!"/>
        <Constant name="F" dimension="charge_per_mole" value="96485.3 C_per_mol" description="TODO: Make this a global constant!"/>

        <ComponentReference name="ionChannel" type="baseIonChannel"/>

        <Requirement name="temperature" dimension="temperature"/>
        <Requirement name="caConc" dimension="concentration"/>
        <Requirement name="caConcExt" dimension="concentration"/>

        <Text name="segmentGroup"/>

        <Text name="ion"/>
        <Dynamics>

            <DerivedVariable name="K" dimension="per_voltage"  value="(zCa * F) / (R * temperature)"/>
            <DerivedVariable name="expKv" dimension="none"  value="exp(-1 * K * v)"/>
            <DerivedVariable name="channelf" dimension="none" select="ionChannel/fopen"/>

            <ConditionalDerivedVariable name="iDensity"  dimension="currentDensity" exposure="iDensity">
	            <Case condition="caConcExt .gt. 0" value="-1 * channelf * permeability * zCa * F * K * v * ( caConc - (caConcExt * expKv) ) / (1 - expKv)"/>
	            <Case condition="caConcExt .leq. 0" value="0"/>
	    </ConditionalDerivedVariable>

        </Dynamics>
        <Structure>
            <ChildInstance component="ionChannel"/>
        </Structure>
    </ComponentType>

    <ComponentType name="pointCellCondBased"
        extends="baseCellMembPotCap"
        description="Simple model of a conductance based cell, with no separate morphology element, just an absolute capacitance _C, and a set of channel populations">

        <Parameter name="v0" dimension="voltage"/>
        <Parameter name="thresh" dimension="voltage"/>

        <Children name="populations" type="baseChannelPopulation"/>

        <Attachments name="synapses" type="basePointCurrent"/>

        <Dynamics>

            <StateVariable name="v" exposure="v" dimension="voltage"/>
            <StateVariable name="spiking" dimension="none"/>

            <DerivedVariable name="iChannels" dimension="current" select="populations[*]/i" reduce="add"/>
            <DerivedVariable name="iSyn" dimension="current" exposure="iSyn" select="synapses[*]/i" reduce="add" />
            <DerivedVariable name="iMemb" dimension="current" exposure="iMemb" value="iChannels + iSyn"/>

            <TimeDerivative variable="v" value="iMemb / C"/>

            <OnStart>
                <StateAssignment variable="v" value="v0"/>
                <StateAssignment variable="spiking" value="0"/>
            </OnStart>

            <OnCondition test="v .gt. thresh .and. spiking .lt. 0.5">
                <StateAssignment variable="spiking" value="1"/>
                <EventOut port="spike"/>
            </OnCondition>

            <OnCondition test="v .lt. thresh">
                <StateAssignment variable="spiking" value="0"/>
            </OnCondition>

        </Dynamics>

    </ComponentType>

    <ComponentType name="pointCellCondBasedCa"
        extends="baseCellMembPotCap"
        description="TEMPORARY: Point cell with conductances and Ca concentration  info. Not yet fully tested!!!">

        <Parameter name="v0" dimension="voltage"/>
        <Parameter name="thresh" dimension="voltage"/>

        <Children name="populations" type="baseChannelPopulation"/>
        <Children name="concentrationModels" type="concentrationModel"/>

        <Attachments name="synapses" type="basePointCurrent"/>

        <Exposure name="iCa" dimension="current"/>
        <Exposure name="caConc" dimension="concentration"/>

        <Dynamics>

            <StateVariable name="v" exposure="v" dimension="voltage"/>
            <StateVariable name="spiking" dimension="none"/>

            <DerivedVariable name="iChannels" dimension="current" select="populations[*]/i" reduce="add"/>
            <DerivedVariable name="iCa" dimension="current" exposure="iCa"  select="populations[ion='ca']/i" reduce="add"/>
            <DerivedVariable name="caConc" dimension="concentration" exposure="caConc"  select="concentrationModels[species='ca']/concentration" reduce="add"/>

            <DerivedVariable name="iSyn" dimension="current" exposure="iSyn" select="synapses[*]/i" reduce="add" />
            <DerivedVariable name="iMemb" dimension="current" exposure="iMemb" value="iChannels + iSyn"/>

            <TimeDerivative variable="v" value="iMemb / C"/>

            <OnStart>
                <StateAssignment variable="v" value="v0"/>
                <StateAssignment variable="spiking" value="0"/>
            </OnStart>

            <OnCondition test="v .gt. thresh .and. spiking .lt. 0.5">
                <StateAssignment variable="spiking" value="1"/>
                <EventOut port="spike"/>
            </OnCondition>

            <OnCondition test="v .lt. thresh">
                <StateAssignment variable="spiking" value="0"/>
            </OnCondition>

        </Dynamics>

    </ComponentType>

    <ComponentType name="distal"
        extends="point3DWithDiam"
        description="Point furthest from the soma in a segment">
    </ComponentType>

    <ComponentType name="proximal"
        extends="point3DWithDiam"
        description="Point closest to the soma in a segment. Note, if the proximal point is equal to the distal point of the parent segment, proximal can be omitted.">

    </ComponentType>

    <ComponentType name="parent"
        description="Specifies the segment which is this segment's parent">
        <Text name="segment"/>
    </ComponentType>

    <ComponentType name="segment"
        description="A segment defines the smallest unit within a possibly branching structure (_morphology_), such as a dendrite or axon. The shape is given by the _proximal_ and _distal_ points. If _proximal_ is missing, the proximal point is assumed to be the _distal_ point of the parent. _parent_ specifies the parent segment. The first segment (no _parent_) usually represents the soma. NOTE: LEMS does not yet support multicompartmental modelling, so the Dynamics here is only appropriate for single compartment modelling. ">

        <Constant name="LEN" dimension="length" value="1m"/>
        <Child name="parent" type="parent"/>
        <Child name="distal" type="distal"/>
        <Child name="proximal" type="proximal"/>

        <Exposure name="surfaceArea" dimension="area"/>
        <Exposure name="radDist" dimension="length"/>
        <Exposure name="length" dimension="length"/>

        <Text name="name"/>

        <Dynamics>

            <DerivedVariable name="radDist" dimension="length" exposure="radDist" select = "distal/radius"/>

            <DerivedVariable name="dx" dimension="length" select = "distal/xLength"/>
            <DerivedVariable name="dy" dimension="length" select = "distal/yLength"/>
            <DerivedVariable name="dz" dimension="length" select = "distal/zLength"/>
            <DerivedVariable name="px" dimension="length" select = "proximal/xLength"/>
            <DerivedVariable name="py" dimension="length" select = "proximal/yLength"/>
            <DerivedVariable name="pz" dimension="length" select = "proximal/zLength"/>

            <DerivedVariable name="length" dimension="length" exposure="length" value = "sqrt(((dx - px) * (dx - px) + (dy - py) * (dy - py) + (dz - pz) * (dz - pz))/(LEN * LEN)) * LEN"/>

			<ConditionalDerivedVariable name="surfaceArea" dimension="area" exposure="surfaceArea">
            	<Case condition="length .eq. 0" value="4 * radDist * radDist * 3.14159265"/>
				<Case condition="length .gt. 0" value="2 * radDist * 3.14159265 * length"/>
			</ConditionalDerivedVariable>

        </Dynamics>

    </ComponentType>

    <ComponentType name="segmentGroup" description="A method to describe a group of _segment_s in a _morphology_">
        <Children name="members" type="member"/>
        <Children name="paths" type="path"/>
        <Children name="subTrees" type="subTree"/>
        <Children name="includes" type="include"/>
        <Text name="neuroLexId"/>
    </ComponentType>

    <ComponentType name="member" description="A single identified _segment_ which is part of the _segmentGroup_">
        <Text name="segment"/>
    </ComponentType>

    <ComponentType name="from" description="Specifies which _segment_ distal from which to calculate the _segmentGroup_">
        <Text name="segment"/>
    </ComponentType>

    <ComponentType name="to" description="Specifies which _segment_ up to which to calculate the _segmentGroup_">
        <Text name="segment"/>
    </ComponentType>

    <ComponentType name="include" description="Include all members of another _segmentGroup_ in this">
        <Text name="href"/>
        <Text name="segmentGroup"/>
    </ComponentType>

    <ComponentType name="path" description="Include all the segments between those specified by _from_ and _to_, inclusive">
        <Child name="from" type="from"/>
        <Child name="to" type="to"/>
    </ComponentType>

    <ComponentType name="subTree" description="Include all the segments distal to that specified by _from_ in the _segmentGroup_">
        <Child name="from" type="from"/>
    </ComponentType>

    <ComponentType name="morphology" description="The collection of _segment_s which specify the 3D structure of the cell, along with a number of _segmentGroup_s">

        <Children name="segments" type="segment"/>

        <Children name="segmentGroups" type="segmentGroup"/>

    </ComponentType>

    <ComponentType name="specificCapacitance"
        description="Capacitance per unit area">
        <Parameter name="value" dimension="specificCapacitance"/>
        <Exposure name="totSpecCap" dimension="specificCapacitance"/>

        <Dynamics>
            <DerivedVariable name="totSpecCap" dimension="specificCapacitance" exposure="totSpecCap" value="value"/>
        </Dynamics>

    </ComponentType>

    <ComponentType name="initMembPotential"
       description="Explicitly set initial membrane potential for the cell">

        <Parameter name="value" dimension="voltage"/>

    </ComponentType>

    <ComponentType name="spikeThresh"
        description="Membrane potential at which to emit a spiking event. Note, usually the spiking event will not be emitted again until the membrane potential has fallen below this value and rises again to cross it in a positive direction">

        <Parameter name="value" dimension="voltage"/>

    </ComponentType>

    <ComponentType name="membraneProperties"
       description="Properties specific to the membrane, such as the _populations of channels, _channelDensities, _specificCapacitance, etc.">
        <Child name="specificCapacitance" type="specificCapacitance"/>
        <Child name="initMembPotential" type="initMembPotential"/>
        <Child name="spikeThresh" type="spikeThresh"/>
        <Children name="populations" type="baseChannelPopulation"/>
        <Children name="channelDensities" type="baseChannelDensity"/>

        <Exposure name="totChanCurrent" dimension="current"/>

        <Exposure name="iCa" dimension="current"/>

        <Exposure name="totSpecCap" dimension="specificCapacitance"/>

        <Requirement name="surfaceArea" dimension="area"/>

        <Dynamics>
            <DerivedVariable name="totSpecCap" dimension="specificCapacitance" exposure="totSpecCap" select="specificCapacitance/totSpecCap"/>

            <DerivedVariable name="totChanPopCurrent" dimension="current" select="populations[*]/i" reduce="add"/>
            <DerivedVariable name="totChanDensCurrentDensity" dimension="currentDensity" select="channelDensities[*]/iDensity" reduce="add"/>

            <DerivedVariable name="totChanCurrent" dimension="current" exposure="totChanCurrent" value="totChanPopCurrent + (totChanDensCurrentDensity * surfaceArea)"/>

            <DerivedVariable name="totChanPopCurrentCa" dimension="current" select="populations[ion='ca']/i" reduce="add"/>
            <DerivedVariable name="totChanDensCurrentDensityCa" dimension="currentDensity" select="channelDensities[ion='ca']/iDensity" reduce="add"/>

            <DerivedVariable name="iCa" dimension="current" exposure="iCa" value="totChanPopCurrentCa + (totChanDensCurrentDensityCa * surfaceArea)"/>
        </Dynamics>

    </ComponentType>

    <ComponentType name="biophysicalProperties"
        description="The biophysical properties of the _cell_, including the _membraneProperties_ and the _intracellularProperties_">
        <Child name="membraneProperties" type="membraneProperties"/>

        <Child name="intracellularProperties" type="intracellularProperties"/>

        <Exposure name="totSpecCap" dimension="specificCapacitance"/>

        <Dynamics>
            <DerivedVariable name="totSpecCap" dimension="specificCapacitance" exposure="totSpecCap" select="membraneProperties/totSpecCap"/>
        </Dynamics>

    </ComponentType>

    <ComponentType name="intracellularProperties"
        description="Biophysical properties related to the intracellular space within the _cell_, such as the _resistivity_ and the list of _species_ present. _caConc and _caConcExt are explicitly exposed here to facilitate accessing these values from other Components, even though _caConcExt is clearly not an intracellular property">

        <Child name="resistivity" type="resistivity"/>
        <Children name="speciesList" type="species"/>

        <Exposure name="caConc" dimension="concentration"/>
        <Exposure name="caConcExt" dimension="concentration"/>

        <Dynamics>
            <DerivedVariable name="caConc" dimension="concentration" exposure="caConc" select="speciesList[ion='ca']/concentration" reduce="add" required="false"/>
            <DerivedVariable name="caConcExt" dimension="concentration" exposure="caConcExt" select="speciesList[ion='ca']/extConcentration" reduce="add" required="false"/>
        </Dynamics>
    </ComponentType>

    <ComponentType name="resistivity"
       description="The resistivity, or specific axial resistance, of the cytoplasm">

        <Parameter name="value" dimension="resistivity"/>

    </ComponentType>

    <ComponentType name="concentrationModel"
        description="Base for any model of an ion concentration which changes with time. Internal, _concentration, and external, _extConcentration, values for the concentration of the ion (specified by _species) are given.">

        <Exposure name="concentration" dimension="concentration"/>
        <Exposure name="extConcentration" dimension="concentration"/>

        <Requirement name="surfaceArea" dimension="area"/>

        <Requirement name="initialConcentration" dimension="concentration"/>
        <Requirement name="initialExtConcentration" dimension="concentration"/>

        <Text name="species"/>

        <Dynamics>
            <StateVariable name="concentration" exposure="concentration" dimension="concentration"/>
            <StateVariable name="extConcentration" exposure="extConcentration" dimension="concentration"/>
            <OnStart>
                <StateAssignment variable="concentration" value="initialConcentration"/>
                <StateAssignment variable="extConcentration" value="initialExtConcentration"/>
            </OnStart>
        </Dynamics>

    </ComponentType>
    <ComponentType name="decayingPoolConcentrationModel"
        extends="concentrationModel"
        description="Model of buffering of concentration of an ion (currently hard coded to be calcium, due to requirement for _iCa) which has a baseline level _restingConc and tends to this value with time course _decayConstant. The ion is assumed to occupy a shell inside the membrane of thickness _shellThickness.">

        <Parameter name="restingConc" dimension="concentration"/>
        <Parameter name="decayConstant" dimension="time"/>
        <Parameter name="shellThickness" dimension="length"/>

        <Constant name="Faraday" dimension="charge_per_mole" value="96485.3C_per_mol"/>
        <Constant name="AREA_SCALE" dimension="area" value="1m2"/>
        <Constant name="LENGTH_SCALE" dimension="length" value="1m"/>

        <Requirement name="iCa" dimension="current"/>

        <Text name="species"/>

        <Dynamics>

            <StateVariable name="concentration" exposure="concentration" dimension="concentration"/>
            <StateVariable name="extConcentration" exposure="extConcentration" dimension="concentration"/>

            <DerivedVariable name="effectiveRadius" dimension="length" value="LENGTH_SCALE * sqrt(surfaceArea/(AREA_SCALE * (4 * 3.14159)))"/>
            <DerivedVariable name="innerRadius" dimension="length" value="effectiveRadius - shellThickness"/>

            <DerivedVariable name="shellVolume" dimension="volume" value="(4 * (effectiveRadius * effectiveRadius * effectiveRadius) * 3.14159 / 3) - (4 * (innerRadius * innerRadius * innerRadius) * 3.14159 / 3)"/>

            <TimeDerivative variable="concentration" value="iCa / (2 * Faraday * shellVolume) - ((concentration - restingConc) / decayConstant)"/>

            <OnStart>
                <StateAssignment variable="concentration" value="initialConcentration"/>
                <StateAssignment variable="extConcentration" value="initialExtConcentration"/>
            </OnStart>

            <OnCondition test="concentration .lt. 0">
                <StateAssignment variable="concentration" value="0"/>
            </OnCondition>

        </Dynamics>

    </ComponentType>

    <ComponentType name="fixedFactorConcentrationModel"
        extends="concentrationModel"
        description="Model of buffering of concentration of an ion (currently hard coded to be calcium, due to requirement for _iCa) which has a baseline level _restingConc and tends to this value with time course _decayConstant. A fixed factor _rho is used to scale the incoming current INDEPENDENTLY OF THE SIZE OF THE COMPARTMENT to produce a concentration change.">

        <Parameter name="restingConc" dimension="concentration"/>
        <Parameter name="decayConstant" dimension="time"/>

        <Parameter name="rho" dimension="rho_factor"/>

        <Requirement name="iCa" dimension="current"/>
        <Requirement name="surfaceArea" dimension="area"/>

        <Text name="species"/>

        <Dynamics>

            <StateVariable name="concentration" exposure="concentration" dimension="concentration"/>
            <StateVariable name="extConcentration" exposure="extConcentration" dimension="concentration"/>

	    <TimeDerivative variable="concentration" value="(iCa/surfaceArea) * rho - ((concentration - restingConc) / decayConstant)"/>

            <OnStart>
                <StateAssignment variable="concentration" value="initialConcentration"/>
                <StateAssignment variable="extConcentration" value="initialExtConcentration"/>
            </OnStart>

            <OnCondition test="concentration .lt. 0">
                <StateAssignment variable="concentration" value="0"/>
            </OnCondition>
        </Dynamics>
    </ComponentType>

    <ComponentType name="species"
        description="Description of a chemical species identified by _ion, which has internal, _concentration, and external, _extConcentration values for its concentration">

        <Parameter name="initialConcentration" dimension="concentration"/>
        <Parameter name="initialExtConcentration" dimension="concentration"/>

        <ComponentReference name="concentrationModel" type="concentrationModel"/>

        <Exposure name="concentration" dimension="concentration"/>
        <Exposure name="extConcentration" dimension="concentration"/>

        <Text name="ion"/>

        <Dynamics>

            <DerivedVariable name="concentration" exposure="concentration" dimension="concentration" select="concentrationModel/concentration"/>
            <DerivedVariable name="extConcentration" exposure="extConcentration" dimension="concentration" select="concentrationModel/extConcentration"/>

        </Dynamics>

        <Structure>
            <ChildInstance component="concentrationModel"/>
        </Structure>

    </ComponentType>

    <ComponentType name="cell"
        extends="baseCellMembPot"
        description="Cell with _segment_s specified in a _morphology_ element along with details on its _biophysicalProperties_. NOTE: this can only be correctly simulated using LEMS when there is a single segment in the cell, and _v of this cell represents the membrane potential in that isopotential segment!!!">

        <Child name="notes" type="notes"/>
        <Child name="annotation" type="annotation"/>

        <Child name="morphology" type="morphology"/>

        <Child name="biophysicalProperties" type="biophysicalProperties"/>

        <Attachments name="synapses" type="basePointCurrent"/>

        <Exposure name="spiking" dimension="none"/>
        <Exposure name="debugVal" dimension="none"/>
        <Exposure name="iChannels" dimension="current"/>
        <Exposure name="iSyn" dimension="current"/>
        <Exposure name="totSpecCap" dimension="specificCapacitance"/>

        <Exposure name="surfaceArea" dimension="area"/>

        <Exposure name="iCa" dimension="current"/>
        <Exposure name="caConc" dimension="concentration"/>
        <Exposure name="caConcExt" dimension="concentration"/>

        <Dynamics>
            <StateVariable name="v" exposure="v" dimension="voltage"/>
            <StateVariable name="spiking" exposure="spiking" dimension="none"/>
            <StateVariable name="debugVal" exposure="debugVal" dimension="none"/>

            <DerivedVariable name="initMembPot" dimension="voltage" select="biophysicalProperties/membraneProperties/initMembPotential/value"/>
            <DerivedVariable name="thresh" dimension="voltage" select="biophysicalProperties/membraneProperties/spikeThresh/value"/>

            <DerivedVariable name="debug" dimension="none" select="biophysicalProperties/membraneProperties/totChanCurrent"/>

            <DerivedVariable name="surfaceArea" exposure="surfaceArea" dimension="area" select="morphology/segments[*]/surfaceArea" reduce="add"/>

            <DerivedVariable name="totSpecCap" dimension="specificCapacitance" exposure="totSpecCap" select="biophysicalProperties/totSpecCap"/>
            <DerivedVariable name="totCap" dimension="capacitance" value="totSpecCap * surfaceArea "/>

            <DerivedVariable name="iChannels" dimension="current" exposure="iChannels" select="biophysicalProperties/membraneProperties/totChanCurrent"/>
            <DerivedVariable name="iSyn" dimension="current" exposure="iSyn" select="synapses[*]/i" reduce="add" />

            <DerivedVariable name="iCa" dimension="current" exposure="iCa" select="biophysicalProperties/membraneProperties/iCa"/>
            <DerivedVariable name="caConc" dimension="concentration" exposure="caConc"  select="biophysicalProperties/intracellularProperties/caConc"/>
            <DerivedVariable name="caConcExt" dimension="concentration" exposure="caConcExt"  select="biophysicalProperties/intracellularProperties/caConcExt"/>

            <TimeDerivative variable="v" value="(iChannels + iSyn) / totCap"/>

            <OnStart>
                <StateAssignment variable="spiking" value="0"/>
                <StateAssignment variable="v" value="initMembPot"/>
            </OnStart>

            <OnCondition test="v .gt. thresh .and. spiking .lt. 0.5">
                <StateAssignment variable="spiking" value="1"/>
                <EventOut port="spike"/>
            </OnCondition>

            <OnCondition test="v .lt. thresh">
                <StateAssignment variable="spiking" value="0"/>
            </OnCondition>

            <OnCondition test="t .geq. 0">
                <StateAssignment variable="debugVal" value="debug"/>
            </OnCondition>

        </Dynamics>

    </ComponentType>

    <ComponentType name="baseCellMembPotCap"
        extends="baseCellMembPot"
        description="Any cell with a membrane potential _v with voltage units and a membrane capacitance _C. Also defines exposed value _iSyn for current due to external synapses and _iMemb for total current crossing membrane (normally channel currents plus _iSyn)">
        <Parameter name="C" dimension="capacitance" description="Total capacitance of the cell membrane"/>
        <Exposure name="iSyn" dimension="current" description="Total current due to synaptic inputs"/>
        <Exposure name="iMemb" dimension="current" description="Total current crossing the cell membrane"/>
    </ComponentType>

    <ComponentType name="baseIaf"
       extends="baseCellMembPot"
       description="Base ComponentType for an integrate and fire cell which emits a spiking event at membrane potential _thresh and and resets to _reset">
        <Parameter name="thresh" dimension="voltage" description="The membrane potential at which to emit a spiking event and reset voltage"/>
        <Parameter name="reset" dimension="voltage" description="The value the membrane potential is reset to on spiking"/>
    </ComponentType>

    <ComponentType name="iafTauCell"
        extends="baseIaf"
        description="Integrate and fire cell which returns to its leak reversal potential of _leakReversal with a time course _tau">

        <Parameter name="leakReversal" dimension="voltage"/>
        <Parameter name="tau" dimension="time"/>

        <Dynamics>
            <StateVariable name="v" exposure="v" dimension="voltage"/>

            <TimeDerivative variable="v" value="(leakReversal - v) / tau"/>

            <OnStart>
                <StateAssignment variable="v" value="reset"/>
            </OnStart>

            <OnCondition test="v .gt. thresh">
                <StateAssignment variable="v" value="reset"/>
                <EventOut port="spike"/>
            </OnCondition>

        </Dynamics>

    </ComponentType>

    <ComponentType name="iafTauRefCell"
        extends="iafTauCell"
        description="Integrate and fire cell which returns to its leak reversal potential of _leakReversal with a time course _tau. It has a refractory period of _refract after spiking">

        <Parameter name="refract" dimension="time"/>

        <Dynamics>
            <StateVariable name="v" exposure="v" dimension="voltage"/>
            <StateVariable name="lastSpikeTime" dimension="time"/>

            <OnStart>
                <StateAssignment variable="v" value="reset"/>
            </OnStart>

            <Regime name="refractory">
                <OnEntry>
                    <StateAssignment variable="lastSpikeTime" value="t" />
                    <StateAssignment variable="v" value="reset" />
                </OnEntry>
                <OnCondition test="t .gt. lastSpikeTime + refract">
                    <Transition regime="integrating" />
                </OnCondition>
            </Regime>

            <Regime name="integrating" initial="true">
                <TimeDerivative variable="v" value="(leakReversal - v) / tau" />
                <OnCondition test="v .gt. thresh">
                    <EventOut port="spike"/>
                    <Transition regime="refractory" />
                </OnCondition>

            </Regime>

        </Dynamics>

    </ComponentType>

    <ComponentType name="baseIafCapCell"
        extends="baseCellMembPotCap"
        description="Base Type for all Integrate and Fire cells with a capacitance _C, threshold _thresh and reset membrane potential _reset">
        <Parameter name="thresh" dimension="voltage"/>
        <Parameter name="reset" dimension="voltage"/>
    </ComponentType>

    <ComponentType name="iafCell"
        extends="baseIafCapCell"
        description="Integrate and fire cell with capacitance _C, _leakConductance and _leakReversal">

        <Parameter name="leakConductance" dimension="conductance"/>
        <Parameter name="leakReversal" dimension="voltage"/>

        <Attachments name="synapses" type="basePointCurrent"/>

        <Dynamics>

            <StateVariable name="v" exposure="v" dimension="voltage"/>

            <DerivedVariable name="iSyn" dimension="current" exposure="iSyn" select="synapses[*]/i" reduce="add" />
            <DerivedVariable name="iMemb" dimension="current" exposure="iMemb" value="leakConductance * (leakReversal - v) + iSyn"/>

            <TimeDerivative variable="v" value="iMemb / C"/>

            <OnStart>
                <StateAssignment variable="v" value="reset"/>
            </OnStart>

            <OnCondition test="v .gt. thresh">
                <StateAssignment variable="v" value="reset"/>
                <EventOut port="spike"/>
            </OnCondition>

        </Dynamics>

    </ComponentType>

    <ComponentType name="iafRefCell"
		   extends="iafCell"
		   description="Integrate and fire cell  with capacitance _C, _leakConductance, _leakReversal and refractory period _refract">

      <Parameter name="refract" dimension="time"/>

      <Attachments name="synapses" type="basePointCurrent"/>

      <Dynamics>
	<StateVariable name="v" exposure="v" dimension="voltage"/>
	<StateVariable name="lastSpikeTime" dimension="time"/>

	<DerivedVariable name="iSyn" dimension="current" exposure="iSyn" select="synapses[*]/i" reduce="add" />
	<DerivedVariable name="iMemb" dimension="current" exposure="iMemb" value="leakConductance * (leakReversal - v) + iSyn"/>

	<OnStart>
	  <StateAssignment variable="v" value="reset"/>
	</OnStart>

	<Regime name="refractory">
	  <OnEntry>
	    <StateAssignment variable="lastSpikeTime" value="t" />
	    <StateAssignment variable="v" value="reset" />
	  </OnEntry>
	  <OnCondition test="t .gt. lastSpikeTime + refract">
	    <Transition regime="integrating" />
	  </OnCondition>
	</Regime>

	<Regime name="integrating" initial="true">
	  <TimeDerivative variable="v" value="iMemb / C"/>
	  <OnCondition test="v .gt. thresh">
	    <EventOut port="spike"/>
	    <Transition regime="refractory" />
	  </OnCondition>
	</Regime>

      </Dynamics>

    </ComponentType>

    <ComponentType name="izhikevichCell"
        extends="baseCellMembPot"
        description="Cell based on the model of Izhikevich, see http://izhikevich.org/publications/spikes.htm">

        <Parameter name="v0" dimension="voltage"/>
        <Parameter name="a" dimension="none"/>
        <Parameter name="b" dimension="none"/>
        <Parameter name="c" dimension="none"/>
        <Parameter name="d" dimension="none"/>
        <Parameter name="thresh" dimension="voltage"/>

        <Constant name="MSEC" dimension="time" value="1ms"/>
        <Constant name="MVOLT" dimension="voltage" value="1mV"/>

        <Attachments name="synapses" type="basePointCurrentDL"/>

        <Exposure name="U" dimension="none"/>

        <Dynamics>

            <StateVariable name="v" dimension="voltage" exposure="v"/>
            <StateVariable name="U" dimension="none" exposure="U"/>

            <DerivedVariable name="ISyn" dimension="none" select="synapses[*]/I" reduce="add" />

            <TimeDerivative variable="v" value="(0.04 * v^2 / MVOLT + 5 * v + (140.0 - U + ISyn) * MVOLT)/MSEC"/>
            <TimeDerivative variable="U" value="a * (b * v / MVOLT - U) / MSEC"/>

            <OnStart>
                <StateAssignment variable="v" value="v0"/>
                <StateAssignment variable="U" value="v0 * b / MVOLT"/>
            </OnStart>

            <OnCondition test="v .gt. thresh">
                <StateAssignment variable="v" value="c * MVOLT"/>
                <StateAssignment variable="U" value="U + d"/>
                <EventOut port="spike"/>
            </OnCondition>

        </Dynamics>

    </ComponentType>

    <ComponentType name="adExIaFCell"
        extends="baseCellMembPotCap"
        description="Model based on Brette R and Gerstner W (2005) Adaptive Exponential Integrate-and-Fire Model as an Effective Description of Neuronal Activity. J Neurophysiol 94:3637-3642">

        <Parameter name="gL" dimension="conductance"/>
        <Parameter name="EL" dimension="voltage"/>
        <Parameter name="VT" dimension="voltage"/>
        <Parameter name="thresh" dimension="voltage"/>
        <Parameter name="reset" dimension="voltage"/>
        <Parameter name="delT" dimension="voltage"/>
        <Parameter name="tauw" dimension="time"/>

        <Parameter name="refract" dimension="time"/>

        <Parameter name="a" dimension="conductance"/>
        <Parameter name="b" dimension="current"/>

        <Attachments name="synapses" type="basePointCurrent"/>

        <Exposure name="w" dimension="current"/>

        <Dynamics>

            <StateVariable name="v" dimension="voltage" exposure="v"/>
            <StateVariable name="w" dimension="current" exposure="w"/>

            <StateVariable name="lastSpikeTime" dimension="time"/>

            <DerivedVariable name="iSyn" dimension="current" exposure="iSyn" select="synapses[*]/i" reduce="add" />
            <DerivedVariable name="iMemb" dimension="current" exposure="iMemb" value="-1 * gL * (v - EL) + gL * delT * exp((v - VT) / delT) - w + iSyn"/>

            <OnStart>
                <StateAssignment variable="v" value="EL"/>
                <StateAssignment variable="w" value="0"/>

            </OnStart>

            <Regime name="refractory">

                <TimeDerivative variable="w" value="(a * (v - EL) - w) / tauw"/>
                <OnEntry>
                    <StateAssignment variable="lastSpikeTime" value="t" />
                    <StateAssignment variable="v" value="reset" />
                    <StateAssignment variable="w" value="w + b"/>
                </OnEntry>
                <OnCondition test="t .gt. lastSpikeTime + refract">
                    <Transition regime="integrating" />
                </OnCondition>
            </Regime>

            <Regime name="integrating" initial="true">
                <TimeDerivative variable="v" value="iMemb / C"/>
                <TimeDerivative variable="w" value="(a * (v - EL) - w) / tauw"/>

                <OnCondition test="v .gt. thresh">
                    <EventOut port="spike"/>
                    <Transition regime="refractory" />
                </OnCondition>

            </Regime>

        </Dynamics>

    </ComponentType>

    <ComponentType name="fitzHughNagumoCell"
        extends="baseCellMembPotDL"
        description="Simple dimensionless model of spiking cell from FitzHugh and Nagumo. Based on http://www.scholarpedia.org/article/FitzHugh-Nagumo_model">

        <Parameter name="I" dimension="none"/>

        <Constant name="SEC" dimension="time" value="1s"/>

        <Exposure name="W" dimension="none"/>

        <Dynamics>

            <StateVariable name="V" dimension="none" exposure="V"/>
            <StateVariable name="W" dimension="none" exposure="W"/>

            <TimeDerivative variable="V" value="( (V - ((V^3) / 3)) - W + I) / SEC"/>
            <TimeDerivative variable="W" value="(0.08 * (V + 0.7 - 0.8 * W)) / SEC"/>

        </Dynamics>

    </ComponentType>

    <ComponentType name="basePyNNCell"
        description="Base type of any PyNN standard cell model. Note: membrane potential _v has dimensions voltage, but all other parameters are dimensionless. This is to facilitate translation to and from PyNN scripts in Python, where these parameters have implicit units, see http://neuralensemble.org/trac/PyNN/wiki/StandardModels" extends="baseCellMembPot">

        <Parameter name="cm" dimension="none"/>
        <Parameter name="i_offset" dimension="none"/>
        <Parameter name="tau_syn_E" dimension="none"/>
        <Parameter name="tau_syn_I" dimension="none"/>

        <Parameter name="v_init" dimension="none"/>

        <Exposure name="ISyn" dimension="none"/>

    </ComponentType>

    <ComponentType name="basePyNNIaFCell" extends="basePyNNCell"
        description="Base type of any PyNN standard integrate and fire model">

        <Parameter name="tau_refrac" dimension="none"/>
        <Parameter name="v_thresh" dimension="none"/>
        <Parameter name="tau_m" dimension="none"/>
        <Parameter name="v_rest" dimension="none"/>
        <Parameter name="v_reset" dimension="none"/>

    </ComponentType>

    <ComponentType name="basePyNNIaFCondCell" extends="basePyNNIaFCell"
        description="Base type of conductance based PyNN IaF cell models">

        <Parameter name="e_rev_E" dimension="none"/>
        <Parameter name="e_rev_I" dimension="none"/>

    </ComponentType>

    <ComponentType name="IF_curr_alpha" extends="basePyNNIaFCell"
        description="Leaky integrate and fire model with fixed threshold and alpha-function-shaped post-synaptic current">

        <Constant name="SEC" dimension="time" value="1s"/>
        <Constant name="MSEC" dimension="time" value="1ms"/>
        <Constant name="MVOLT" dimension="voltage" value="1mV"/>

        <Child name="notes" type="notes"/>

        <Attachments name="synapses" type="alphaCurrSynapse"/>

        <Dynamics>
            <StateVariable name="v" exposure="v" dimension="voltage"/>
            <StateVariable name="lastSpikeTime" dimension="time"/>

            <DerivedVariable name="ISyn" dimension="none" exposure="ISyn" select="synapses[*]/I" reduce="add" />

            <OnStart>
                <StateAssignment variable="v" value="v_init * MVOLT"/>
            </OnStart>

            <Regime name="refractory">
                <OnEntry>
                    <StateAssignment variable="lastSpikeTime" value="t" />
                    <StateAssignment variable="v" value="v_reset * MVOLT" />
                </OnEntry>
                <OnCondition test="t .gt. lastSpikeTime + (tau_refrac*MSEC)">
                    <Transition regime="integrating" />
                </OnCondition>
            </Regime>

            <Regime name="integrating" initial="true">
                <TimeDerivative variable="v" value="MVOLT * (((i_offset + ISyn)/cm) +  ((v_rest - (v/MVOLT)) / tau_m))/MSEC" />
                <OnCondition test="v .gt. v_thresh * MVOLT">
                    <EventOut port="spike"/>
                    <Transition regime="refractory" />
                </OnCondition>
            </Regime>

        </Dynamics>

    </ComponentType>

    <ComponentType name="IF_curr_exp" extends="basePyNNIaFCell"
        description="Leaky integrate and fire model with fixed threshold and decaying-exponential post-synaptic current">

        <Constant name="SEC" dimension="time" value="1s"/>
        <Constant name="MSEC" dimension="time" value="1ms"/>
        <Constant name="MVOLT" dimension="voltage" value="1mV"/>

        <Child name="notes" type="notes"/>

        <Attachments name="synapses" type="expCurrSynapse"/>

        <Dynamics>
            <StateVariable name="v" exposure="v" dimension="voltage"/>
            <StateVariable name="lastSpikeTime" dimension="time"/>

            <DerivedVariable name="ISyn" dimension="none" exposure="ISyn" select="synapses[*]/I" reduce="add" />

            <OnStart>
                <StateAssignment variable="v" value="v_init * MVOLT"/>
            </OnStart>

            <Regime name="refractory">
                <OnEntry>
                    <StateAssignment variable="lastSpikeTime" value="t" />
                    <StateAssignment variable="v" value="v_reset * MVOLT" />
                </OnEntry>
                <OnCondition test="t .gt. lastSpikeTime + (tau_refrac*MSEC)">
                    <Transition regime="integrating" />
                </OnCondition>
            </Regime>

            <Regime name="integrating" initial="true">
                <TimeDerivative variable="v" value="MVOLT * (((i_offset + ISyn)/cm) +  ((v_rest - (v/MVOLT)) / tau_m))/MSEC" />
                <OnCondition test="v .gt. v_thresh * MVOLT">
                    <EventOut port="spike"/>
                    <Transition regime="refractory" />
                </OnCondition>
            </Regime>

        </Dynamics>

    </ComponentType>

    <ComponentType name="IF_cond_alpha" extends="basePyNNIaFCondCell"
        description="Leaky integrate and fire model with fixed threshold and alpha-function-shaped post-synaptic conductance">

        <Constant name="SEC" dimension="time" value="1s"/>
        <Constant name="MSEC" dimension="time" value="1ms"/>
        <Constant name="MVOLT" dimension="voltage" value="1mV"/>

        <Child name="notes" type="notes"/>

        <Attachments name="synapses" type="alphaCondSynapse"/>

        <Dynamics>
            <StateVariable name="v" exposure="v" dimension="voltage"/>
            <StateVariable name="lastSpikeTime" dimension="time"/>

            <DerivedVariable name="ISyn" dimension="none" exposure="ISyn" select="synapses[*]/I" reduce="add" />

            <OnStart>
                <StateAssignment variable="v" value="v_init * MVOLT"/>
            </OnStart>

            <Regime name="refractory">
                <OnEntry>
                    <StateAssignment variable="lastSpikeTime" value="t" />
                    <StateAssignment variable="v" value="v_reset * MVOLT" />
                </OnEntry>
                <OnCondition test="t .gt. lastSpikeTime + (tau_refrac*MSEC)">
                    <Transition regime="integrating" />
                </OnCondition>
            </Regime>

            <Regime name="integrating" initial="true">
                <TimeDerivative variable="v" value="MVOLT * (((i_offset + ISyn) / cm) +  ((v_rest - (v / MVOLT)) / tau_m)) / MSEC" />
                <OnCondition test="v .gt. v_thresh * MVOLT">
                    <EventOut port="spike"/>
                    <Transition regime="refractory" />
                </OnCondition>
            </Regime>

        </Dynamics>

    </ComponentType>

    <ComponentType name="IF_cond_exp" extends="basePyNNIaFCondCell"
        description="Leaky integrate and fire model with fixed threshold and exponentially-decaying post-synaptic conductance">

        <Constant name="SEC" dimension="time" value="1s"/>
        <Constant name="MSEC" dimension="time" value="1ms"/>
        <Constant name="MVOLT" dimension="voltage" value="1mV"/>

        <Child name="notes" type="notes"/>

        <Attachments name="synapses" type="expCondSynapse"/>

        <Dynamics>
            <StateVariable name="v" exposure="v" dimension="voltage"/>
            <StateVariable name="lastSpikeTime" dimension="time"/>

            <DerivedVariable name="ISyn" dimension="none" exposure="ISyn" select="synapses[*]/I" reduce="add" />

            <OnStart>
                <StateAssignment variable="v" value="v_init * MVOLT"/>
            </OnStart>

            <Regime name="refractory">
                <OnEntry>
                    <StateAssignment variable="lastSpikeTime" value="t" />
                    <StateAssignment variable="v" value="v_reset * MVOLT" />
                </OnEntry>
                <OnCondition test="t .gt. lastSpikeTime + (tau_refrac*MSEC)">
                    <Transition regime="integrating" />
                </OnCondition>
            </Regime>

            <Regime name="integrating" initial="true">
                <TimeDerivative variable="v" value="MVOLT * (((i_offset + ISyn)/cm) +  ((v_rest - (v / MVOLT)) / tau_m)) / MSEC" />
                <OnCondition test="v .gt. v_thresh * MVOLT">
                    <EventOut port="spike"/>
                    <Transition regime="refractory" />
                </OnCondition>
            </Regime>

        </Dynamics>

    </ComponentType>

    <ComponentType name="EIF_cond_exp_isfa_ista" extends="basePyNNIaFCondCell"
        description="Adaptive exponential integrate and fire neuron according to Brette R and Gerstner W (2005) with exponentially-decaying post-synaptic conductance">

        <Parameter name="v_rest" dimension="none"/>
        <Parameter name="v_spike" dimension="none"/>
        <Parameter name="delta_T" dimension="none"/>
        <Parameter name="tau_w" dimension="none"/>

        <Parameter name="a" dimension="none"/>
        <Parameter name="b" dimension="none"/>

        <Parameter name="i_offset" dimension="none"/>

        <Parameter name="tau_refrac" dimension="none"/>

        <Constant name="SEC" dimension="time" value="1s"/>
        <Constant name="MSEC" dimension="time" value="1ms"/>
        <Constant name="MVOLT" dimension="voltage" value="1mV"/>

        <Child name="notes" type="notes"/>

        <Attachments name="synapses" type="expCondSynapse"/>

        <Exposure name="w" dimension="none"/>

        <Dynamics>

            <StateVariable name="v" dimension="voltage" exposure="v"/>
            <StateVariable name="w" dimension="none" exposure="w"/>
            <StateVariable name="lastSpikeTime" dimension="time"/>

            <DerivedVariable name="ISyn" dimension="none" exposure="ISyn" select="synapses[*]/I" reduce="add" />

            <OnStart>
                <StateAssignment variable="v" value="v_init * MVOLT"/>
                <StateAssignment variable="w" value="0"/>
            </OnStart>

            <Regime name="refractory">

                <TimeDerivative variable="w" value="(1 / tau_w) * (a * ((v / MVOLT) - v_rest) - w) / MSEC"/>

                <OnEntry>
                    <StateAssignment variable="lastSpikeTime" value="t" />
                    <StateAssignment variable="v" value="v_reset * MVOLT" />
                    <StateAssignment variable="w" value="w+b"/>
                </OnEntry>

                <OnCondition test="t .gt. lastSpikeTime + (tau_refrac*MSEC)">
                    <Transition regime="integrating" />
                </OnCondition>
            </Regime>

            <Regime name="integrating" initial="true">

                <TimeDerivative variable="v" value="MVOLT * ((-1 * ((v / MVOLT) - v_rest) + delta_T * exp(((v / MVOLT) - v_thresh) / delta_T)) / tau_m + (i_offset + ISyn - w) / cm) / MSEC"/>
                <TimeDerivative variable="w" value="(1 / tau_w) * (a * ((v / MVOLT) - v_rest) - w) / MSEC"/>

                <OnCondition test="v .gt. v_spike * MVOLT">
                    <EventOut port="spike"/>
                    <Transition regime="refractory" />
                </OnCondition>

            </Regime>

        </Dynamics>

    </ComponentType>

    <ComponentType name="EIF_cond_alpha_isfa_ista" extends="basePyNNIaFCondCell"
        description="Adaptive exponential integrate and fire neuron according to Brette R and Gerstner W (2005) with alpha-function-shaped post-synaptic conductance">

        <Parameter name="v_rest" dimension="none"/>
        <Parameter name="v_spike" dimension="none"/>
        <Parameter name="delta_T" dimension="none"/>
        <Parameter name="tau_w" dimension="none"/>

        <Parameter name="a" dimension="none"/>
        <Parameter name="b" dimension="none"/>

        <Parameter name="i_offset" dimension="none"/>

        <Parameter name="tau_refrac" dimension="none"/>

        <Constant name="SEC" dimension="time" value="1s"/>
        <Constant name="MSEC" dimension="time" value="1ms"/>
        <Constant name="MVOLT" dimension="voltage" value="1mV"/>

        <Child name="notes" type="notes"/>

        <Attachments name="synapses" type="alphaCondSynapse"/>

        <Exposure name="w" dimension="none"/>

        <Dynamics>

            <StateVariable name="v" dimension="voltage" exposure="v"/>
            <StateVariable name="w" dimension="none" exposure="w"/>
            <StateVariable name="lastSpikeTime" dimension="time"/>

            <DerivedVariable name="ISyn" dimension="none" exposure="ISyn" select="synapses[*]/I" reduce="add" />

            <OnStart>
                <StateAssignment variable="v" value="v_init * MVOLT"/>
                <StateAssignment variable="w" value="0"/>
            </OnStart>

            <Regime name="refractory">

                <TimeDerivative variable="w" value="(1 / tau_w) * (a * ((v / MVOLT) - v_rest) - w) / MSEC"/>

                <OnEntry>
                    <StateAssignment variable="lastSpikeTime" value="t" />
                    <StateAssignment variable="v" value="v_reset * MVOLT" />
                    <StateAssignment variable="w" value="w + b"/>
                </OnEntry>

                <OnCondition test="t .gt. lastSpikeTime + (tau_refrac * MSEC)">
                    <Transition regime="integrating" />
                </OnCondition>
            </Regime>

            <Regime name="integrating" initial="true">

                <TimeDerivative variable="v" value="MVOLT * ((-1 * ( (v / MVOLT) - v_rest) + delta_T * exp(((v / MVOLT) - v_thresh) / delta_T)) / tau_m + (i_offset + ISyn - w) / cm) / MSEC"/>
                <TimeDerivative variable="w" value="(1/ tau_w) * (a*((v/MVOLT)-v_rest) - w) /MSEC"/>

                <OnCondition test="v .gt. v_spike * MVOLT">
                    <EventOut port="spike"/>
                    <Transition regime="refractory" />
                </OnCondition>

            </Regime>

        </Dynamics>

    </ComponentType>

    <ComponentType name="HH_cond_exp" extends="basePyNNCell"
        description="Single-compartment Hodgkin-Huxley-type neuron with transient sodium and delayed-rectifier potassium currents using the ion channel models from Traub.">

        <Parameter name="gbar_K" dimension="none"/>
        <Parameter name="gbar_Na" dimension="none"/>
        <Parameter name="g_leak" dimension="none"/>

        <Parameter name="e_rev_K" dimension="none"/>
        <Parameter name="e_rev_Na" dimension="none"/>
        <Parameter name="e_rev_leak" dimension="none"/>

        <Parameter name="v_offset" dimension="none"/>

        <Parameter name="e_rev_E" dimension="none"/>
        <Parameter name="e_rev_I" dimension="none"/>

        <Constant name="SEC" dimension="time" value="1s"/>
        <Constant name="MSEC" dimension="time" value="1ms"/>
        <Constant name="MVOLT" dimension="voltage" value="1mV"/>

        <Child name="notes" type="notes"/>

        <Attachments name="synapses" type="alphaCondSynapse"/>

        <Exposure name="m" dimension="none"/>
        <Exposure name="h" dimension="none"/>
        <Exposure name="n" dimension="none"/>

        <Dynamics>
            <StateVariable name="v" dimension="voltage" exposure="v"/>
            <StateVariable name="m" dimension="none" exposure="m"/>
            <StateVariable name="h" dimension="none" exposure="h"/>
            <StateVariable name="n" dimension="none" exposure="n"/>
            <DerivedVariable name="ISyn" dimension="none" exposure="ISyn" select="synapses[*]/I" reduce="add" />

            <DerivedVariable name="iLeak" dimension="none" value="g_leak * (e_rev_leak - (v / MVOLT))"/>
            <DerivedVariable name="iNa" dimension="none" value="gbar_Na * (m * m * m) * h * (e_rev_Na - (v / MVOLT))"/>
            <DerivedVariable name="iK" dimension="none" value="gbar_K * (n * n * n * n) * (e_rev_K - (v / MVOLT))"/>
            <DerivedVariable name="iMemb" dimension="none" value="iLeak + iNa + iK + i_offset + ISyn"/>

            <DerivedVariable name="alpham" dimension="none" value="0.32 * (13 - (v / MVOLT) + v_offset) / (exp((13 - (v / MVOLT) + v_offset) / 4.0) - 1)"/>
            <DerivedVariable name="betam" dimension="none"  value="0.28 * ((v / MVOLT) - v_offset - 40) / (exp(((v / MVOLT) - v_offset - 40) / 5.0) - 1)"/>
            <DerivedVariable name="alphah" dimension="none" value="0.128 * exp((17 - (v / MVOLT) + v_offset) / 18.0)"/>
            <DerivedVariable name="betah" dimension="none" value="4.0 / (1 + exp((40 - (v / MVOLT) + v_offset) / 5))"/>
            <DerivedVariable name="alphan" dimension="none" value="0.032 * (15 - (v / MVOLT) + v_offset) / (exp((15 - (v / MVOLT) + v_offset) / 5) - 1)"/>
            <DerivedVariable name="betan" dimension="none" value="0.5 * exp((10 - (v / MVOLT) + v_offset) / 40)"/>

            <TimeDerivative variable="v" value="MVOLT * (iMemb / cm) / MSEC"/>

            <TimeDerivative variable="m" value="(alpham * (1 - m) - betam * m) / MSEC"/>
            <TimeDerivative variable="h" value="(alphah * (1 - h) - betah * h) / MSEC"/>
            <TimeDerivative variable="n" value="(alphan * (1 - n) - betan * n) / MSEC"/>

            <OnStart>
                <StateAssignment variable="v" value="v_init * MVOLT"/>
            </OnStart>

        </Dynamics>

    </ComponentType>

    <ComponentType name="basePynnSynapse"
        description="Base type for all PyNN synapses. Note, the current _I produced is dimensionless, but it requires a membrane potential _v with dimension voltage">

        <Parameter name="tau_syn" dimension="none"/>

        <EventPort name="in" direction="in"/>
        <Exposure name="I" dimension="none"/>
        <Requirement name="v" dimension="voltage"/>

    </ComponentType>

    <ComponentType name="expCondSynapse" extends="basePynnSynapse" description="Conductance based synapse with instantaneous rise and single exponential decay (with time constant tau_syn)">

        <Property name="weight" dimension="none" />

        <Parameter name="e_rev" dimension="none"/>
        <Constant name="MSEC" dimension="time" value="1ms"/>
        <Constant name="MVOLT" dimension="voltage" value="1mV"/>

        <Exposure name="g" dimension="none"/>

        <Dynamics>
            <StateVariable name="g" dimension="none" exposure="g"/>

            <DerivedVariable name="I" exposure="I" dimension="none" value="g * (e_rev - (v/MVOLT))" />

            <TimeDerivative variable="g" value="-g / (tau_syn*MSEC)" />

            <OnEvent port="in">
                <StateAssignment variable="g" value="g+weight" />
            </OnEvent>

        </Dynamics>

    </ComponentType>

    <ComponentType name="expCurrSynapse" extends="basePynnSynapse" description="Current based synapse with instantaneous rise and single exponential decay (with time constant tau_syn)">

        <Property name="weight" dimension="none" />

        <Constant name="MSEC" dimension="time" value="1ms"/>
        <Constant name="MVOLT" dimension="voltage" value="1mV"/>

        <Dynamics>
            <StateVariable name="I" dimension="none" exposure="I"/>

            <TimeDerivative variable="I" value="-I / (tau_syn*MSEC)" />

            <OnEvent port="in">
                <StateAssignment variable="I" value="I+weight" />
            </OnEvent>

        </Dynamics>

    </ComponentType>

    <ComponentType name="alphaCondSynapse" extends="basePynnSynapse" description="Alpha synapse: rise time and decay time are both tau_syn. Conductance based synapse.">

        <Property name="weight" dimension="none" />

        <Parameter name="e_rev" dimension="none"/>
        <Constant name="MSEC" dimension="time" value="1ms"/>
        <Constant name="MVOLT" dimension="voltage" value="1mV"/>

        <Exposure name="g" dimension="none"/>
        <Exposure name="y" dimension="none"/>

        <Dynamics>
            <StateVariable name="g" exposure="g" dimension="none"/>
            <StateVariable name="y" exposure="y" dimension="none"/>

            <DerivedVariable name="I" exposure="I" dimension="none" value="g * (e_rev - (v/MVOLT))" />

            <TimeDerivative variable="g" value="(2.7182818*y - g)/(tau_syn*MSEC)" />
            <TimeDerivative variable="y" value="-y /(tau_syn*MSEC)" />

            <OnEvent port="in">
                <StateAssignment variable="y" value="y + weight" />
            </OnEvent>

        </Dynamics>

    </ComponentType>

    <ComponentType name="alphaCurrSynapse" extends="basePynnSynapse" description="Alpha synapse: rise time and decay time are both tau_syn. Current based synapse.">

        <Property name="weight" dimension="none" />

        <Constant name="MSEC" dimension="time" value="1ms"/>
        <Constant name="MVOLT" dimension="voltage" value="1mV"/>

        <Exposure name="y" dimension="none"/>

        <Dynamics>
            <StateVariable name="I" exposure="I" dimension="none"/>
            <StateVariable name="y" exposure="y" dimension="none"/>

            <TimeDerivative variable="I" value="(2.7182818*y - I)/(tau_syn*MSEC)" />
            <TimeDerivative variable="y" value="-y /(tau_syn*MSEC)" />

            <OnEvent port="in">
                <StateAssignment variable="y" value="y + weight" />
            </OnEvent>

        </Dynamics>

    </ComponentType>

    <ComponentType name="SpikeSourcePoisson" extends="baseSpikeSource"
        description="Spike source, generating spikes according to a Poisson process.">

        <Parameter name="start" dimension="time"/>
        <Parameter name="duration" dimension="time"/>
        <Parameter name="rate" dimension="per_time"/>

        <DerivedParameter name="end" dimension="time" value="start + duration"/>

        <Child name="notes" type="notes"/>

        <EventPort name="in" direction="in"/>

        <Dynamics>
            <StateVariable name="tsince" dimension="time" exposure="tsince"/>
            <StateVariable name="nextSpike" dimension="time"/>

            <TimeDerivative variable="tsince" value="1"/>

            <OnStart>
                <StateAssignment variable="nextSpike" value="start + exp(-1*random(1))/rate"/>
                <StateAssignment variable="tsince" value="0"/>
            </OnStart>

            <OnCondition test="tsince .gt. nextSpike .and. t .leq. end">
                <StateAssignment variable="nextSpike" value="exp(-1*random(1))/rate"/>
                <StateAssignment variable="tsince" value="0"/>
                <EventOut port="spike"/>
            </OnCondition>

        </Dynamics>
    </ComponentType>

    <ionChannelPassive id="passive" conductance="10pS"/>

    <ionChannelHH id="na" conductance="10pS">

       <gateHHrates id="m" instances="3">
            <forwardRate id="forwardRatem1" type="HHExpLinearRate" rate="1per_ms" midpoint="-40mV" scale="10mV"/>
            <reverseRate id="reverseRatem1" type="HHExpRate" rate="4per_ms" midpoint="-65mV" scale="-18mV"/>
       </gateHHrates>

       <gateHHrates id="h" instances="1">
           <forwardRate id="forwardRateh1" type="HHExpRate" rate="0.07per_ms" midpoint="-65mV" scale="-20mV"/>
           <reverseRate id="reverseRateh1" type="HHSigmoidRate" rate="1per_ms" midpoint="-35mV" scale="10mV"/>

       </gateHHrates>

    </ionChannelHH>

    <ionChannelHH id="k" conductance="10pS">
        <gateHHrates id="n" instances="4">
            <forwardRate id="forwardRaten1" type="HHExpLinearRate" rate="0.1per_ms" midpoint="-55mV" scale="10mV"/>
            <reverseRate id="reverseRaten1" type="HHExpRate" rate="0.125per_ms" midpoint="-65mV" scale="-80mV"/>
        </gateHHrates>
    </ionChannelHH>

    <pointCellCondBased id="neuron_model" C="10pF"  v0="-65mV" thresh="20mV">
        <channelPopulation id="leak" ionChannel="passive" number="300" erev="-54.3mV"/>
        <channelPopulation id="naChans" ionChannel="na" number="120000" erev="50mV"/>
        <channelPopulation id="kChans" ionChannel="k" number="36000" erev="-77mV"/>
    </pointCellCondBased>

    <expOneSynapse id="synapsemodel" gbase="1nS" erev="0mV" tauDecay="3ms" />

	<spikeGenerator id="spikeGen_1" period="50ms"/>

    <network id="net1">
        <population id="neuron_model_instance" component="neuron_model" size="1" />
	<population id="spikeGen_1_instance" component="spikeGen_1" size="1" />
<synapticConnection  id="spikeGen_1_conn" from="spikeGen_1_instance[0]" to="neuron_model_instance[0]" synapse="synapsemodel" destination="synapses"/>

    </network>

    <Simulation id="sim1" length="500.0ms" step="0.05ms" target="net1">

        <OutputFile id="results" path="result" fileName="results.csv">
			<OutputColumn id="neuron_model_spike" quantity="neuron_model_instance[0]/spike" />
<OutputColumn id="neuron_model_stateCURRENT_voltage_v" quantity="neuron_model_instance[0]/v" />
<OutputColumn id="neuron_model_stateCURRENT_none_spiking" quantity="neuron_model_instance[0]/spiking" />
<OutputColumn id="neuron_model_stateCURRENT_current_iChannels" quantity="neuron_model_instance[0]/iChannels" />
<OutputColumn id="neuron_model_stateCURRENT_current_iSyn" quantity="neuron_model_instance[0]/iSyn" />
<OutputColumn id="neuron_model_stateCURRENT_current_iMemb" quantity="neuron_model_instance[0]/iMemb" />
<OutputColumn id="neuron_model_spike" quantity="neuron_model_instance[0]/spike" />
<OutputColumn id="neuron_model_stateCURRENT_conductance_leak_channelg" quantity="neuron_model_instance[0]/leak/channelg" />
<OutputColumn id="neuron_model_stateCURRENT_conductance_leak_geff" quantity="neuron_model_instance[0]/leak/geff" />
<OutputColumn id="neuron_model_stateCURRENT_current_leak_i" quantity="neuron_model_instance[0]/leak/i" />
<OutputColumn id="neuron_model_spike" quantity="neuron_model_instance[0]/spike" />
<OutputColumn id="neuron_model_stateCURRENT_none_leak_passive_fopen" quantity="neuron_model_instance[0]/leak/passive/fopen" />
<OutputColumn id="neuron_model_stateCURRENT_conductance_leak_passive_g" quantity="neuron_model_instance[0]/leak/passive/g" />
<OutputColumn id="neuron_model_spike" quantity="neuron_model_instance[0]/spike" />
<OutputColumn id="neuron_model_stateCURRENT_conductance_naChans_channelg" quantity="neuron_model_instance[0]/naChans/channelg" />
<OutputColumn id="neuron_model_stateCURRENT_conductance_naChans_geff" quantity="neuron_model_instance[0]/naChans/geff" />
<OutputColumn id="neuron_model_stateCURRENT_current_naChans_i" quantity="neuron_model_instance[0]/naChans/i" />
<OutputColumn id="neuron_model_spike" quantity="neuron_model_instance[0]/spike" />
<OutputColumn id="neuron_model_stateCURRENT_none_naChans_na_conductanceScale" quantity="neuron_model_instance[0]/naChans/na/conductanceScale" />
<OutputColumn id="neuron_model_stateCURRENT_none_naChans_na_fopenHHrates" quantity="neuron_model_instance[0]/naChans/na/fopenHHrates" />
<OutputColumn id="neuron_model_stateCURRENT_none_naChans_na_fopenHHtauInf" quantity="neuron_model_instance[0]/naChans/na/fopenHHtauInf" />
<OutputColumn id="neuron_model_stateCURRENT_none_naChans_na_fopenHHratesTau" quantity="neuron_model_instance[0]/naChans/na/fopenHHratesTau" />
<OutputColumn id="neuron_model_stateCURRENT_none_naChans_na_fopenHHratesInf" quantity="neuron_model_instance[0]/naChans/na/fopenHHratesInf" />
<OutputColumn id="neuron_model_stateCURRENT_none_naChans_na_fopenHHratesTauInf" quantity="neuron_model_instance[0]/naChans/na/fopenHHratesTauInf" />
<OutputColumn id="neuron_model_stateCURRENT_none_naChans_na_fopen" quantity="neuron_model_instance[0]/naChans/na/fopen" />
<OutputColumn id="neuron_model_stateCURRENT_conductance_naChans_na_g" quantity="neuron_model_instance[0]/naChans/na/g" />
<OutputColumn id="neuron_model_spike" quantity="neuron_model_instance[0]/spike" />
<OutputColumn id="neuron_model_stateCURRENT_none_naChans_na_m_q" quantity="neuron_model_instance[0]/naChans/na/m/q" />
<OutputColumn id="neuron_model_stateCURRENT_none_naChans_na_m_rateScale" quantity="neuron_model_instance[0]/naChans/na/m/rateScale" />
<OutputColumn id="neuron_model_stateCURRENT_per_time_naChans_na_m_alpha" quantity="neuron_model_instance[0]/naChans/na/m/alpha" />
<OutputColumn id="neuron_model_stateCURRENT_per_time_naChans_na_m_beta" quantity="neuron_model_instance[0]/naChans/na/m/beta" />
<OutputColumn id="neuron_model_stateCURRENT_none_naChans_na_m_fcond" quantity="neuron_model_instance[0]/naChans/na/m/fcond" />
<OutputColumn id="neuron_model_stateCURRENT_none_naChans_na_m_inf" quantity="neuron_model_instance[0]/naChans/na/m/inf" />
<OutputColumn id="neuron_model_stateCURRENT_time_naChans_na_m_tau" quantity="neuron_model_instance[0]/naChans/na/m/tau" />
<OutputColumn id="neuron_model_spike" quantity="neuron_model_instance[0]/spike" />
<OutputColumn id="neuron_model_stateCURRENT_none_naChans_na_m_forwardRatem1_x" quantity="neuron_model_instance[0]/naChans/na/m/forwardRatem1/x" />
<OutputColumn id="neuron_model_stateCURRENT_per_time_naChans_na_m_forwardRatem1_r" quantity="neuron_model_instance[0]/naChans/na/m/forwardRatem1/r" />
<OutputColumn id="neuron_model_spike" quantity="neuron_model_instance[0]/spike" />
<OutputColumn id="neuron_model_stateCURRENT_per_time_naChans_na_m_reverseRatem1_r" quantity="neuron_model_instance[0]/naChans/na/m/reverseRatem1/r" />
<OutputColumn id="neuron_model_spike" quantity="neuron_model_instance[0]/spike" />
<OutputColumn id="neuron_model_stateCURRENT_none_naChans_na_h_q" quantity="neuron_model_instance[0]/naChans/na/h/q" />
<OutputColumn id="neuron_model_stateCURRENT_none_naChans_na_h_rateScale" quantity="neuron_model_instance[0]/naChans/na/h/rateScale" />
<OutputColumn id="neuron_model_stateCURRENT_per_time_naChans_na_h_alpha" quantity="neuron_model_instance[0]/naChans/na/h/alpha" />
<OutputColumn id="neuron_model_stateCURRENT_per_time_naChans_na_h_beta" quantity="neuron_model_instance[0]/naChans/na/h/beta" />
<OutputColumn id="neuron_model_stateCURRENT_none_naChans_na_h_fcond" quantity="neuron_model_instance[0]/naChans/na/h/fcond" />
<OutputColumn id="neuron_model_stateCURRENT_none_naChans_na_h_inf" quantity="neuron_model_instance[0]/naChans/na/h/inf" />
<OutputColumn id="neuron_model_stateCURRENT_time_naChans_na_h_tau" quantity="neuron_model_instance[0]/naChans/na/h/tau" />
<OutputColumn id="neuron_model_spike" quantity="neuron_model_instance[0]/spike" />
<OutputColumn id="neuron_model_stateCURRENT_per_time_naChans_na_h_forwardRateh1_r" quantity="neuron_model_instance[0]/naChans/na/h/forwardRateh1/r" />
<OutputColumn id="neuron_model_spike" quantity="neuron_model_instance[0]/spike" />
<OutputColumn id="neuron_model_stateCURRENT_per_time_naChans_na_h_reverseRateh1_r" quantity="neuron_model_instance[0]/naChans/na/h/reverseRateh1/r" />
<OutputColumn id="neuron_model_spike" quantity="neuron_model_instance[0]/spike" />
<OutputColumn id="neuron_model_stateCURRENT_conductance_kChans_channelg" quantity="neuron_model_instance[0]/kChans/channelg" />
<OutputColumn id="neuron_model_stateCURRENT_conductance_kChans_geff" quantity="neuron_model_instance[0]/kChans/geff" />
<OutputColumn id="neuron_model_stateCURRENT_current_kChans_i" quantity="neuron_model_instance[0]/kChans/i" />
<OutputColumn id="neuron_model_spike" quantity="neuron_model_instance[0]/spike" />
<OutputColumn id="neuron_model_stateCURRENT_none_kChans_k_conductanceScale" quantity="neuron_model_instance[0]/kChans/k/conductanceScale" />
<OutputColumn id="neuron_model_stateCURRENT_none_kChans_k_fopenHHrates" quantity="neuron_model_instance[0]/kChans/k/fopenHHrates" />
<OutputColumn id="neuron_model_stateCURRENT_none_kChans_k_fopenHHtauInf" quantity="neuron_model_instance[0]/kChans/k/fopenHHtauInf" />
<OutputColumn id="neuron_model_stateCURRENT_none_kChans_k_fopenHHratesTau" quantity="neuron_model_instance[0]/kChans/k/fopenHHratesTau" />
<OutputColumn id="neuron_model_stateCURRENT_none_kChans_k_fopenHHratesInf" quantity="neuron_model_instance[0]/kChans/k/fopenHHratesInf" />
<OutputColumn id="neuron_model_stateCURRENT_none_kChans_k_fopenHHratesTauInf" quantity="neuron_model_instance[0]/kChans/k/fopenHHratesTauInf" />
<OutputColumn id="neuron_model_stateCURRENT_none_kChans_k_fopen" quantity="neuron_model_instance[0]/kChans/k/fopen" />
<OutputColumn id="neuron_model_stateCURRENT_conductance_kChans_k_g" quantity="neuron_model_instance[0]/kChans/k/g" />
<OutputColumn id="neuron_model_spike" quantity="neuron_model_instance[0]/spike" />
<OutputColumn id="neuron_model_stateCURRENT_none_kChans_k_n_q" quantity="neuron_model_instance[0]/kChans/k/n/q" />
<OutputColumn id="neuron_model_stateCURRENT_none_kChans_k_n_rateScale" quantity="neuron_model_instance[0]/kChans/k/n/rateScale" />
<OutputColumn id="neuron_model_stateCURRENT_per_time_kChans_k_n_alpha" quantity="neuron_model_instance[0]/kChans/k/n/alpha" />
<OutputColumn id="neuron_model_stateCURRENT_per_time_kChans_k_n_beta" quantity="neuron_model_instance[0]/kChans/k/n/beta" />
<OutputColumn id="neuron_model_stateCURRENT_none_kChans_k_n_fcond" quantity="neuron_model_instance[0]/kChans/k/n/fcond" />
<OutputColumn id="neuron_model_stateCURRENT_none_kChans_k_n_inf" quantity="neuron_model_instance[0]/kChans/k/n/inf" />
<OutputColumn id="neuron_model_stateCURRENT_time_kChans_k_n_tau" quantity="neuron_model_instance[0]/kChans/k/n/tau" />
<OutputColumn id="neuron_model_spike" quantity="neuron_model_instance[0]/spike" />
<OutputColumn id="neuron_model_stateCURRENT_none_kChans_k_n_forwardRaten1_x" quantity="neuron_model_instance[0]/kChans/k/n/forwardRaten1/x" />
<OutputColumn id="neuron_model_stateCURRENT_per_time_kChans_k_n_forwardRaten1_r" quantity="neuron_model_instance[0]/kChans/k/n/forwardRaten1/r" />
<OutputColumn id="neuron_model_spike" quantity="neuron_model_instance[0]/spike" />
<OutputColumn id="neuron_model_stateCURRENT_per_time_kChans_k_n_reverseRaten1_r" quantity="neuron_model_instance[0]/kChans/k/n/reverseRaten1/r" />
<OutputColumn id="neuron_model_spike" quantity="neuron_model_instance[0]/spike" />
<OutputColumn id="neuron_model_stateCURRENT_conductance_synapsemodel_g" quantity="neuron_model_instance[0]/synapsemodel/g" />
<OutputColumn id="neuron_model_stateCURRENT_current_synapsemodel_i" quantity="neuron_model_instance[0]/synapsemodel/i" />

        </OutputFile>

        <OutputFile id="stimulus" path="result" fileName="stimulus.csv">
			<OutputColumn id="spikeGen_1_instance_spike" quantity="spikeGen_1_instance[0]/spike_state" />

        </OutputFile>

    </Simulation>

</Lems>
